folder Simulations: version=36; creator=Apsim 7.6-r3494
  memo readMe
    2Aug2013 These are PFR datasets used to run original maize (maize.for) and Plant.NET maize for the development an dvalidation of the latest.

    Responsibles:
    ellen.hume@plantandfood.co.nz (Datasets compilation)
    mike.george@plantandfood.co.nz  (APSIM simulation set up)
    edmar.teixeira@plantandfood.co.nz (Managing this LUCI objective)
  simulation Test
    metfile met: filename=%apsim%\Examples\MetFiles\Dalby.met
    clock
      start_date = 1/09/1988  # Enter the start date of the simulation
      end_date = 31/12/1989  # Enter the end date of the simulation
    summaryfile
    area paddock
      Soil
        InitialWater Initial water: FractionFull=0.00; PercentMethod=FilledFromTop
        Water
          Thickness  BD    AirDry  LL15  DUL   SAT
          100        1.35  0.04    0.11  0.22  0.3
          100        1.35  0.14    0.14  0.25  0.3
          100        1.35  0.15    0.16  0.27  0.32
          200        1.4   0.16    0.17  0.28  0.33
          200        1.4   0.18    0.19  0.3   0.34
          200        1.4   0.18    0.2   0.3   0.35
          200        1.4   0.18    0.2   0.31  0.36
          200        1.4   0.18    0.2   0.32  0.37
          200        1.4   0.18    0.2   0.31  0.37
          200        1.4   0.18    0.2   0.31  0.37
          SoilCrop sorg
            LL=[0.11, 0.14, 0.16, 0.17, 0.19, 0.2, 0.2, 0.2, 0.2, 0.2]
            KL=[0.07, 0.07, 0.07, 0.07, 0.07, 0.07, 0.04, 0.04, 0.04, 0.04]
            XF=[1, 1, 1, 1, 1, 1, 1, 1, 1, 1]
          SoilCrop cowpea
            LL=[0.11, 0.14, 0.16, 0.17, 0.19, 0.2, 0.2, 0.2, 0.2, 0.2]
            KL=[0.08, 0.08, 0.08, 0.08, 0.06, 0.04, 0.03, 0.02, 0.01, 0.01]
            XF=[1, 1, 1, 1, 1, 1, 1, 1, 1, 1]
          SoilCrop maize
            LL=[0.11, 0.14, 0.16, 0.17, 0.19, 0.2, 0.2, 0.2, 0.2, 0.2]
            KL=[0.08, 0.08, 0.08, 0.08, 0.06, 0.04, 0.03, 0.02, 0.01, 0.01]
            XF=[1, 1, 1, 1, 1, 1, 1, 1, 1, 1]
          SoilCrop mucuna
            LL=[0.11, 0.14, 0.16, 0.17, 0.19, 0.2, 0.2, 0.2, 0.2, 0.2]
            KL=[0.08, 0.08, 0.08, 0.08, 0.06, 0.04, 0.03, 0.02, 0.01, 0.01]
            XF=[1, 1, 1, 1, 1, 1, 1, 1, 1, 1]
          SoilCrop peanut
            LL=[0.11, 0.14, 0.16, 0.17, 0.19, 0.2, 0.2, 0.2, 0.2, 0.2]
            KL=[0.08, 0.08, 0.08, 0.08, 0.06, 0.04, 0.03, 0.02, 0.01, 0.01]
            XF=[1, 1, 1, 1, 1, 1, 1, 1, 1, 1]
          SoilCrop pigeonp
            LL=[0.11, 0.14, 0.16, 0.17, 0.19, 0.2, 0.2, 0.2, 0.2, 0.2]
            KL=[0.08, 0.08, 0.08, 0.08, 0.06, 0.04, 0.03, 0.02, 0.01, 0.01]
            XF=[1, 1, 1, 1, 1, 1, 1, 1, 1, 1]
          SoilCrop soybean
            LL=[0.11, 0.14, 0.16, 0.17, 0.19, 0.2, 0.2, 0.2, 0.2, 0.2]
            KL=[0.08, 0.08, 0.08, 0.08, 0.06, 0.04, 0.03, 0.02, 0.01, 0.01]
            XF=[1, 1, 1, 1, 1, 1, 1, 1, 1, 1]
        SoilWater: SummerCona=2.5; SummerU=9; SummerDate=1-Nov; WinterCona=2.5; WinterU=9; WinterDate=1-Apr; DiffusConst=88; DiffusSlope=35.4; Salb=0.13; CN2Bare=75; CNRed=20; CNCov=0.8; Thickness=[100, 100, 100, 200, 200, 200, 200, 200, 200, 200]; SWCON=[0.5, 0.5, 0.5, 0.5, 0.5, 0.5, 0.5, 0.5, 0.5, 0.5]
        SoilOrganicMatter: RootCN=45; RootWt=1000; SoilCN=14.5; EnrACoeff=7.4; EnrBCoeff=0.2
          Thickness  OC    FBiom  FInert
          100        1.2   0.02   0.6
          100        1     0.01   0.65
          100        0.86  0.01   0.7
          200        0.83  0.01   0.75
          200        0.58  0.01   0.8
          200        0.54  0.01   0.85
          200        0.47  0.01   0.93
          200        0.5   0.01   0.93
          200        0.5   0.01   0.93
          200        0.5   0.01   0.93
        Analysis: Thickness=[100, 100, 100, 200, 200, 200, 200, 200, 200, 200]; PH=[6, 6, 6, 6.2, 6.5, 6.7, 6.8, 6.8, 6.8, 6.8]
        Phosphorus: RootCP=200; RateDissolRock=0.2; RateLossAvail=0.3; SorptionCoeff=0.7
          Thickness  LabileP  BandedP  RockP  Sorption
          100        5        0        0      50
          100        1        0        0      100
          100        1        0        0      200
          200        1        0        0      200
          200        1        0        0      200
          200        1        0        0      200
          200        1        0        0      200
          200        1        0        0      200
          200        1        0        0      200
          200        1        0        0      200
        Sample Initial nitrogen
          Thickness  NO3    NH4
          100        0.237  0.194
          100        0.712  0.484
          100        0.712  0.290
          200        0.554  0.290
          200        0.395  0.290
          200        0.395  0.290
          200        0.237  0.290
          200        0.237  0.290
          200        0.158  0.290
          200        0.079  0.290
      surfaceom SurfaceOrganicMatter
        PoolName = wheat  # Organic Matter pool name
        type = wheat  # Organic Matter type
        mass = 0  # Initial surface residue (kg/ha)
        cnr = 80  # C:N ratio of initial residue
        standing_fraction = 0  # Fraction of residue standing
      fertiliser
      maize
      folder Manager folder
        manager Sow using a variable rule
          # Sowing criteria
          date1 = 1-oct  # Enter sowing window START date (dd-mmm)
          date2 = 1-feb  # Enter sowing window END date (dd-mmm)
          must_sow = no  # Must sow?
          raincrit = 30  # Amount of rainfall
          rainnumdays = 7  # Number of days of rainfall
          esw_amount = 50  # Enter minimum allowable available soil water (mm)
          # Sowing parameters
          crop = maize  # Enter name of crop to sow
          density = 6  # Enter sowing density (plants/m2)
          depth = 30  # Enter sowing depth (mm)
          cultivar = dekalb_xl82  # Enter cultivar
          class = plant  # Enter crop growth class
          row_spacing = 750  # Enter row spacing (mm)
          on start_of_day:
```
      if (paddock_is_fallow() = 1 and FallowIn <> 'yes' and (NextCrop = 0 or NextCrop = '[crop]')) then
         if (date_within('[date1], [date2]') = 1) then
            if (rain[[rainnumdays]] >= [raincrit] AND esw >= [esw_amount]) OR
                ('[must_sow]' = 'yes' AND today = date('[date2]'))) THEN
               ChooseNextCrop = 'yes'   ! for rotations
               [crop] sow plants =[density], sowing_depth = [depth], cultivar = [cultivar], row_spacing = [row_spacing], crop_class = [class]
            endif
            if today = date('[date2]') then
               ChooseNextCrop = 'yes'
            endif
         endif
      endif
```
        manager Fertilise N at sowing
          # When should fertiliser be applied
          modulename = maize  # On which module should the event come from
          eventname = sowing  # On which event should fertiliser be applied
          # Fertiliser application details
          fertmodule = Fertiliser  # Module used to apply the fertiliser
          fert_amount_sow = 50  # Amount of starter fertiliser at sowing (kg/ha)
          fert_type_sow = urea_N  # Sowing fertiliser type
          on [modulename].[eventname]:
```
        [fertmodule] apply amount = [fert_amount_sow] (kg/ha), depth = 50 (mm), type = [fert_type_sow]
```
        manager Fertilise with Phosphorus at sowing
          # When should fertiliser be applied
          modulename = maize  # On which module should the event come from
          eventname = sowing  # On which event should fertiliser be applied
          # Fertiliser application details
          fertmodule = fertiliser  # Module used to apply the fertiliser
          fert_amount_sow = 150  # Amount of starter fertiliser at sowing (kg/ha)
          fert_type_sow = broadcast_p  # Sowing fertiliser type
          on [modulename].[eventname]:
          script: same as in Test.paddock.Manager folder.Fertilise N at sowing
        manager Harvesting rule
          # Harvesting criteria
          crop = maize  # Enter name of crop to harvest when ripe
          on end_of_day:
```
           if ('[crop]' = 'cotton') then
              if ([crop].ozcot_status > 0) then
                  [crop] harvest
              endif
           elseif ([crop].StageName = 'harvest_ripe' or [crop].plant_status = 'dead') then
              [crop]  harvest
              [crop]  end_crop
           endif
```
      outputfile: filename=Test.out; title=Test
        variables My Variables
          variables: variable, variable, variable, variable, variable, variable, variable, variable, variable, variable, variable
        events My Variables Events: event=event  # End of day
  simulation 01-2010-LINC-MAIZ-MODE
    metfile met: filename=lincoln.met
    clock
      start_date = 01/10/2010  # Enter the start date of the simulation
      end_date = 15/04/2011  # Enter the end date of the simulation
    summaryfile
    memo
      TODO:

      1) Parameterise phenology of hybrid P39V43
      2) Add initial soil nitrogen to soil

      Mikes notes:
      Applied 350kg Cropzeal 15p which has 13.5% N as a base fertiliser to whole trial area. http://www.ballance.co.nz/products/key+products/cropzeal  . For Manager folder>>fertil_applic I just kept this as urea_N
      SurfaceOrganicMatter - Changed to fieldpea and changed C:N ratio to 40 (slightly educated guess) http://panhandlenotill.org/index.php/brown-revolution-part-3/

      TREATMENTS:
      Nitrogen
      NilN = 0 kg/ha
      MedN = 200 kg/ha

      VARIABLES:
      Biomass
      - AboveDM
      - StemDM
      - LeafDM
      - RachisDM --> still need simulated data
      - HuskDM --> still need simulated data
      - GrainDM
      - SenesDM --> still need simulated data

      LAI

      LeafNo
      - LeafTips
      - LeafLigules

      Phenology
      - Emerge
      - Silk
      - Tassel

      LightInt --> still need simulated data

      EAH added observed data and filters for all treatment levels, and treatment/variable info into memo
    area 1_NilN
      Soil paparoa_silt_loam: SoilType=lignin_FOM; Region=Generic soil types; State=Canterbury; Latitude=999999; Longitude=999999; YearOfSampling=0
        DataSource=Profile descriptions provided by Trevor Webb and data for functional horizions based on SWAMP project results
        InitialWater Initial water: FractionFull=0.8; PercentMethod=EvenlyDistributed; RelativeTo=ll15
        Water
          Thickness  BD     AirDry  LL15   DUL    SAT    KS
          200        1.311  0.077   0.154  0.374  0.456  4832.04
          200        1.474  0.152   0.152  0.32   0.413  4715.08
          200        1.601  0.162   0.162  0.325  0.376  98
          300        1.68   0.06    0.06   0.15   0.3    16800
          300        1.68   0.06    0.06   0.15   0.3    16800
          300        1.68   0.06    0.06   0.15   0.3    16800
          SoilCrop Barley: LL=[0.154, 0.152, 0.162, 0.06, 0.06, 0.06]; KL=[0.088, 0.088, 0.07, 0.066, 0.066, 0.066]; XF=[1, 1, 1, 1, 1, 1]
          SoilCrop Canola: LL=[0.154, 0.152, 0.162, 0.06, 0.06, 0.06]; KL=[0.075, 0.075, 0.06, 0.049, 0.049, 0.049]; XF=[1, 1, 0.51, 1, 1, 1]
          SoilCrop Cloverseed: LL=[0.154, 0.152, 0.162, 0.06, 0.06, 0.06]; KL=[0.05, 0.05, 0.04, 0.016, 0.016, 0.016]; XF=[1, 1, 0.73, 1, 1, 1]
          SoilCrop Fieldpea: LL=[0.154, 0.152, 0.162, 0.06, 0.06, 0.06]; KL=[0.1, 0.1, 0.054, 0.009, 0.009, 0.009]; XF=[1, 1, 0.3, 1, 1, 1]
          SoilCrop Fababean: LL=[0.154, 0.152, 0.162, 0.06, 0.06, 0.06]; KL=[0.1, 0.1, 0.08, 0.1, 0.1, 0.1]; XF=[1, 1, 0.51, 1, 1, 1]
          SoilCrop Foragebrassica: LL=[0.154, 0.152, 0.162, 0.06, 0.06, 0.06]; KL=[0.075, 0.075, 0.06, 0.049, 0.049, 0.049]; XF=[1, 1, 0.51, 1, 1, 1]
          SoilCrop Itallian_ryegrass: LL=[0.154, 0.152, 0.162, 0.06, 0.06, 0.06]; KL=[0.075, 0.075, 0.06, 0.057, 0.057, 0.057]; XF=[1, 1, 0.51, 1, 1, 1]
          SoilCrop Lucerne: LL=[0.154, 0.152, 0.162, 0.06, 0.06, 0.06]; KL=[0.038, 0.038, 0.03, 0.019, 0.019, 0.019]; XF=[1, 1, 1, 1, 1, 1]
          SoilCrop Maize: LL=[0.154, 0.152, 0.162, 0.06, 0.06, 0.06]; KL=[0.075, 0.075, 0.06, 0.049, 0.049, 0.049]; XF=[1, 1, 0.51, 1, 1, 1]
          SoilCrop Oats: LL=[0.154, 0.152, 0.162, 0.06, 0.06, 0.06]; KL=[0.075, 0.075, 0.06, 0.049, 0.049, 0.049]; XF=[1, 1, 0.73, 1, 1, 1]
          SoilCrop Potato: LL=[0.154, 0.152, 0.162, 0.06, 0.06, 0.06]; KL=[0.1, 0.057, 0.023, 0.002, 0.002, 0.002]; XF=[1, 1, 0.3, 1, 1, 1]
          SoilCrop Grassseed: LL=[0.154, 0.152, 0.162, 0.06, 0.06, 0.06]; KL=[0.05, 0.05, 0.025, 0.003, 0.003, 0.003]; XF=[1, 1, 0.51, 1, 1, 1]
          SoilCrop Wheat: LL=[0.154, 0.152, 0.162, 0.06, 0.06, 0.06]; KL=[0.075, 0.075, 0.06, 0.049, 0.049, 0.049]; XF=[1, 1, 0.73, 1, 1, 1]
          SoilCrop ryegrass_whiteclover: LL=[0.154, 0.152, 0.162, 0.06, 0.06, 0.06]; KL=[0.05, 0.05, 0.025, 0.003, 0.003, 0.003]; XF=[1, 1, 0.51, 1, 1, 1]
          SoilCrop ryegrass: LL=[0.154, 0.152, 0.162, 0.06, 0.06, 0.06]; KL=[0.05, 0.05, 0.025, 0.003, 0.003, 0.003]; XF=[1, 1, 0.51, 1, 1, 1]
          SoilCrop whiteclover: LL=[0.154, 0.152, 0.162, 0.06, 0.06, 0.06]; KL=[0.1, 0.1, 0.054, 0.009, 0.009, 0.009]; XF=[1, 1, 0.3, 1, 1, 1]
          SoilCrop kale: LL=[0.154, 0.152, 0.162, 0.06, 0.06, 0.06]; KL=[0.06, 0.06, 0.06, 0.06, 0.06, 0.06]; XF=[1, 1, 1, 1, 1, 1]
          SoilCrop triticale: LL=[0.154, 0.152, 0.162, 0.06, 0.06, 0.06]; KL=[0.088, 0.088, 0.07, 0.05, 0.05, 0.05]; XF=[1, 1, 0.73, 1, 1, 1]
        SoilWater: SummerCona=4.4; SummerU=9; SummerDate=1-Nov; WinterCona=3; WinterU=6; WinterDate=1-Apr; DiffusConst=88; DiffusSlope=35; Salb=0.13; CN2Bare=73; CNRed=20; CNCov=0.8; Thickness=[200, 200, 200, 300, 300, 300]; SWCON=[0.5, 0.56, 0.31, 0.7, 0.7, 0.7]
        SoilOrganicMatter: RootCN=16; RootWt=6000; SoilCN=11; EnrACoeff=7.4; EnrBCoeff=0.2; OCUnits=Total
          Thickness  OC    FBiom  FInert
          200        1.8   0.03   0.4
          200        0.97  0.02   0.6
          200        0.42  0.01   0.8
          300        0.23  0.01   0.9
          300        0.23  0.01   0.9
          300        0.23  0.01   0.9
        Analysis: PHUnits=Water; BoronUnits=HotWater
          Thickness  Rocks  PH
          200        0      6
          200        0      6
          200        0      6
          300        0      6
          300        0      6
          300        0      6
        Sample Initial nitrogen: NO3Units=ppm; NH4Units=ppm; SWUnits=Volumetric; OCUnits=Total; PHUnits=Water
          Thickness  NO3       NH4
          200        6.18993   0.343249
          200        3.64993   0.990502
          200        2.44535   0.178014
          300        1.35913   0.194444
          300        0.968254  0.166667
          300        0.345238  0.107143
      irrigation
        automatic_irrigation = off
        asw_depth = 600  # Depth to which ASW is calculated. (mm)
        crit_fr_asw = 0.5  # Fraction of ASW below which irrigation is applied (0-1.0)
        irrigation_efficiency = 1  # Efficiency of the irrigation. (0-1.0)
        irrigation_allocation = off  # Allocation limits
        allocation = 0  # Allocation in mm
        default_no3_conc = 0.0  # Nitrate concentration (ppm N)
        default_nh4_conc = 0.0  # Ammonium concentration (ppm N)
        default_cl_conc = 0.0  # Chloride concentration (ppm Cl)
      surfaceom SurfaceOrganicMatter
        PoolName = fieldpea  # Organic Matter pool name
        type = fieldpea  # Organic Matter type
        mass = 0  # Initial surface residue (kg/ha)
        cnr = 40  # C:N ratio of initial residue
        standing_fraction = 0  # Fraction of residue standing
      fertiliser
      folder Manager folder
        operations sow_harvest
          26/10/2010  maize sow plants =12, sowing_depth = 50, cultivar = Pioneer_39V43, row_spacing = 760, crop_class = plant
          6/04/2011  maize harvest height = 0.1 (mm)
          6/04/2011  maize end_crop
        operations fertil_applic
          22/10/2010  fertiliser apply amount= 47 (kg/ha), type= urea_N (), depth= 10 (mm)
          17/03/2008    (end_of_day)
          1/09/2009    (end_of_day)
          2/03/2009    (end_of_day)
          8/06/2009    (end_of_day)
          6/10/2009    (end_of_day)
        operations irrig_applic
          29/10/2010  irrigation apply amount= 14 (mm)
          3/12/2010  irrigation apply amount= 10 (mm)
          20/12/2010  irrigation apply amount= 20 (mm)
          6/01/2011  irrigation apply amount= 30 (mm)
          17/01/2011  irrigation apply amount= 30 (mm)
          4/02/2011  irrigation apply amount= 30 (mm)
          17/02/2011  irrigation apply amount= 30 (mm)
          3/03/2011  irrigation apply amount= 30 (mm)
          17/03/2008    (end_of_day)
          1/09/2009    (end_of_day)
          2/03/2009    (end_of_day)
          8/06/2009    (end_of_day)
          6/10/2009    (end_of_day)
        manager Report Variables
          on init:
```
! Biomass components (kg dry matter per ha)

   aboveDM = 0
   
   leafDM = 0
   
   stemDM = 0
   
   rootDM = 0

   grainDM = 0
```
          on end_of_day:
```
! --- Plant fractions in kg DM/ha (Units converted Note that maize has variables with different names!)

   aboveDM = biomass

   leafDM = 10 * leafgreenwt
   
   stemDM = 10 * stemgreenwt

   grainDM = 10 * grain_wt
```
      outputfile: filename=01-2010-LINC-MAIZ-MODE 1_NilN.out; title=01-2010-LINC-MAIZ-MODE 1_NilN
        variables My Variables
          variables: ExpNo, TreatNo, dd/mm/yyyy as Date, stage_code, AboveDM, LeafDM, StemDM, GrainDM, leaf_no, lai, cover_tot, sw, HI
        events My Variables Events: event=Daily
      maize
        ini: filename=MaizeValidation.xml
      manager SimCode
        on init:
```
ExpNo = 1
TreatNo = 1
```
    area 2_MedN -> /Simulations/01-2010-LINC-MAIZ-MODE/1_NilN
      folder Manager folder -> /Simulations/01-2010-LINC-MAIZ-MODE/1_NilN/Manager folder
        operations fertil_applic
          22/10/2010  fertiliser apply amount= 47 (kg/ha), type= urea_N (), depth= 10 (mm)
          17/12/2010  fertiliser apply amount= 200 (kg/ha), type= urea_N (), depth= 10 (mm)
          17/03/2008    (end_of_day)
          1/09/2009    (end_of_day)
          2/03/2009    (end_of_day)
          8/06/2009    (end_of_day)
          6/10/2009    (end_of_day)
      manager SimCode
        on init:
```
ExpNo = 1
TreatNo = 2
```
      outputfile -> /Simulations/01-2010-LINC-MAIZ-MODE/1_NilN/outputfile: filename=01-2010-LINC-MAIZ-MODE 2_MedN.out; title=01-2010-LINC-MAIZ-MODE 2_MedN
        variables My Variables -> /Simulations/01-2010-LINC-MAIZ-MODE/1_NilN/outputfile/My Variables
        events My Variables Events -> /Simulations/01-2010-LINC-MAIZ-MODE/1_NilN/outputfile/My Variables Events
  simulation 23-2012-LINC-MAIZ-RAIN
    memo
      TODO:
      - get proper hybrid parameterisation/phenology
      - parameterise irrigation and fertilizer
      - parameterise soil N and water initial
      - Create/link new treatments
      - need simulated data for LightInterception and SoilWater (only have 6 depths) (see VARIABLES comments below)
      - observation: dryland treatments give good fit when initial water is 45mm but in our calculations there was 90 mm.

      TREATMENTS:
      Nitrogen
      NilN = 0 kg/ha
      VLowN = 75 kg/ha
      MedN = 250 kg/ha

      Water
      IrrigFullW = Fully irrigated
      DryW = No water

      VARIABLES:
      Biomass
      - AboveDM
      - StemDM
      - LeafDM
      - RachisDM --> still need simulated data
      - HuskDM --> still need simulated data
      - GrainDM
      - SenesDM --> still need simulated data

      LAI

      LeafNo
      - LeafTips
      - LeafLigules

      Phenology
      - Emerge
      - Silk
      - Tassel

      LightInt --> still need simulated data

      SoilWater
      - 8 depths from 0-160cm (20cm increments) --> only managed to get 6 depths for simulated......

      EAH added observed data and filters for all treatment levels, and treatment/variable info into memo
    metfile met: filename=lincoln.met
    clock
      start_date = 01/10/2012  # Enter the start date of the simulation
      end_date = 15/04/2013  # Enter the end date of the simulation
    summaryfile
    area 1_NilN-IrrigFullW
      Soil paparoa_silt_loam: SoilType=lignin_FOM; Region=Generic soil types; State=Canterbury; Latitude=999999; Longitude=999999; YearOfSampling=0
        DataSource=Profile descriptions provided by Trevor Webb and data for functional horizions based on SWAMP project results
        InitialWater Initial water: FractionFull=0.24; PercentMethod=EvenlyDistributed; RelativeTo=ll15
        Water: same as 01-2010-LINC-MAIZ-MODE.1_NilN.paparoa_silt_loam.Water
        SoilWater: same as 01-2010-LINC-MAIZ-MODE.1_NilN.paparoa_silt_loam.SoilWater
        SoilOrganicMatter: same as 01-2010-LINC-MAIZ-MODE.1_NilN.paparoa_silt_loam.SoilOrganicMatter
        Analysis: PHUnits=Water; BoronUnits=HotWater
          Thickness  Rocks  PH
          200        0      6
          200        0      6
          200        0      6
          300        0      6
          300        0      6
          300        0      6
        Sample Initial nitrogen: NO3Units=kgha; NH4Units=kgha; SWUnits=Volumetric; OCUnits=Total; PHUnits=Water
          Thickness  NO3    NH4
          200        16.23  0.9
          200        10.76  2.92
          200        7.83   0.57
          300        6.85   0.98
          300        4.88   0.84
          300        1.74   0.54
      irrigation: same as 01-2010-LINC-MAIZ-MODE.1_NilN.Irrigation
      surfaceom SurfaceOrganicMatter
        PoolName = wheat  # Organic Matter pool name
        type = wheat  # Organic Matter type
        mass = 0  # Initial surface residue (kg/ha)
        cnr = 80  # C:N ratio of initial residue
        standing_fraction = 0  # Fraction of residue standing
      fertiliser
      folder Manager folder
        operations sow_harvest
          23/10/2012  maize sow plants = 12, sowing_depth = 50, cultivar = Pioneer_39G12, row_spacing = 710, crop_class = plant
          14/04/2013  maize harvest height = 0.1 (mm)
          14/04/2013  maize end_crop
        operations fertil_applic
          17/03/2008    (end_of_day)
          1/09/2009    (end_of_day)
          2/03/2009    (end_of_day)
          8/06/2009    (end_of_day)
          6/10/2009    (end_of_day)
        operations irrig_applic
          24/10/2012  irrigation apply amount= 16 (mm)
          26/10/2012  irrigation apply amount= 10 (mm)
          3/11/2012  irrigation apply amount= 13 (mm)
          11/11/2012  irrigation apply amount= 19.5 (mm)
          15/11/2012  irrigation apply amount= 2.7 (mm)
          23/11/2012  irrigation apply amount= 20 (mm)
          29/11/2012  irrigation apply amount= 20 (mm)
          30/11/2012  irrigation apply amount= 30 (mm)
          13/12/2012  irrigation apply amount= 19 (mm)
          20/12/2012  irrigation apply amount= 26 (mm)
          20/12/2012  irrigation apply amount= 4 (mm)
          27/12/2012  irrigation apply amount= 22 (mm)
          3/01/2013  irrigation apply amount= 39.7 (mm)
          10/01/2013  irrigation apply amount= 42.1 (mm)
          17/01/2013  irrigation apply amount= 46.2 (mm)
          24/01/2013  irrigation apply amount= 44.7 (mm)
          31/01/2013  irrigation apply amount= 44.7 (mm)
          31/01/2013  irrigation apply amount= 4.3 (mm)
          7/02/2013  irrigation apply amount= 37 (mm)
          14/02/2013  irrigation apply amount= 38 (mm)
          21/02/2013  irrigation apply amount= 38 (mm)
          28/02/2013  irrigation apply amount= 33.4 (mm)
          7/03/2013  irrigation apply amount= 39.7 (mm)
          14/03/2013  irrigation apply amount= 31.3 (mm)
          21/03/2013  irrigation apply amount= 24 (mm)
          28/03/2013  irrigation apply amount= 34 (mm)
          4/04/2013  irrigation apply amount= 27.5 (mm)
          17/03/2008    (end_of_day)
          1/09/2009    (end_of_day)
          2/03/2009    (end_of_day)
          8/06/2009    (end_of_day)
          6/10/2009    (end_of_day)
        manager Report Variables
          on init:
```
! Biomass components (kg dry matter per ha)

   aboveDM = 0
   
   leafDM = 0
   
   stemDM = 0
   
   rootDM = 0

   grainDM = 0
```
          on end_of_day:
          script: same as in 01-2010-LINC-MAIZ-MODE.1_NilN.Manager folder.Report Variables
      maize
        ini: filename=MaizeValidation.xml
      manager SimCode
        on init:
```
ExpNo = 23
TreatNo = 1
```
      outputfile -> /Simulations/01-2010-LINC-MAIZ-MODE/2_MedN/outputfile: filename=23-2012-LINC-MAIZ-RAIN 1_NilN-IrrigFullW.out; title=23-2012-LINC-MAIZ-RAIN 1_NilN-IrrigFullW
        variables My Variables -> /Simulations/01-2010-LINC-MAIZ-MODE/2_MedN/outputfile/My Variables
        events My Variables Events -> /Simulations/01-2010-LINC-MAIZ-MODE/2_MedN/outputfile/My Variables Events
    area 2_NilN-DryW -> /Simulations/23-2012-LINC-MAIZ-RAIN/1_NilN-IrrigFullW
      folder Manager folder -> /Simulations/23-2012-LINC-MAIZ-RAIN/1_NilN-IrrigFullW/Manager folder
        operations irrig_applic
          24/10/2012  irrigation apply amount= 16 (mm)
          26/10/2012  irrigation apply amount= 10 (mm)
          3/11/2012  irrigation apply amount= 13 (mm)
          11/11/2012  irrigation apply amount= 19.5 (mm)
          15/11/2012  irrigation apply amount= 2.7 (mm)
          23/11/2012  irrigation apply amount= 20 (mm)
          29/11/2012  irrigation apply amount= 20 (mm)
          20/12/2012  irrigation apply amount= 4 (mm)
          31/01/2013  irrigation apply amount= 4.3 (mm)
          17/03/2008    (end_of_day)
          1/09/2009    (end_of_day)
          2/03/2009    (end_of_day)
          8/06/2009    (end_of_day)
          6/10/2009    (end_of_day)
      manager SimCode
        on init:
```
ExpNo = 23
TreatNo = 2
```
      outputfile -> /Simulations/01-2010-LINC-MAIZ-MODE/2_MedN/outputfile: filename=23-2012-LINC-MAIZ-RAIN 2_NilN-DryW.out; title=23-2012-LINC-MAIZ-RAIN 2_NilN-DryW
        variables My Variables -> /Simulations/01-2010-LINC-MAIZ-MODE/2_MedN/outputfile/My Variables
        events My Variables Events -> /Simulations/01-2010-LINC-MAIZ-MODE/2_MedN/outputfile/My Variables Events
    area 3_VLowN-IrrigFullW -> /Simulations/23-2012-LINC-MAIZ-RAIN/1_NilN-IrrigFullW
      folder Manager folder -> /Simulations/23-2012-LINC-MAIZ-RAIN/1_NilN-IrrigFullW/Manager folder
        operations fertil_applic
          15/11/2012  fertiliser apply amount= 25 (kg/ha), type=urea_N (), depth= 10 (mm)
          20/12/2012  fertiliser apply amount= 50 (kg/ha), type= urea_N (), depth= 10 (mm)
          17/03/2008    (end_of_day)
          1/09/2009    (end_of_day)
          2/03/2009    (end_of_day)
          8/06/2009    (end_of_day)
          6/10/2009    (end_of_day)
      manager SimCode
        on init:
```
ExpNo = 23
TreatNo = 3
```
      outputfile -> /Simulations/01-2010-LINC-MAIZ-MODE/2_MedN/outputfile: filename=23-2012-LINC-MAIZ-RAIN 3_VLowN-IrrigFullW.out; title=23-2012-LINC-MAIZ-RAIN 3_VLowN-IrrigFullW
        variables My Variables -> /Simulations/01-2010-LINC-MAIZ-MODE/2_MedN/outputfile/My Variables
        events My Variables Events -> /Simulations/01-2010-LINC-MAIZ-MODE/2_MedN/outputfile/My Variables Events
    area 4_VLowN-DryW -> /Simulations/23-2012-LINC-MAIZ-RAIN/1_NilN-IrrigFullW
      folder Manager folder -> /Simulations/23-2012-LINC-MAIZ-RAIN/1_NilN-IrrigFullW/Manager folder
        operations fertil_applic: same as 23-2012-LINC-MAIZ-RAIN.3_VLowN-IrrigFullW.Manager folder.fertil_applic
        operations irrig_applic: same as 23-2012-LINC-MAIZ-RAIN.2_NilN-DryW.Manager folder.irrig_applic
      manager SimCode
        on init:
```
ExpNo = 23
TreatNo = 4
```
      outputfile -> /Simulations/01-2010-LINC-MAIZ-MODE/2_MedN/outputfile: filename=23-2012-LINC-MAIZ-RAIN 4_VLowN-DryW.out; title=23-2012-LINC-MAIZ-RAIN 4_VLowN-DryW
        variables My Variables -> /Simulations/01-2010-LINC-MAIZ-MODE/2_MedN/outputfile/My Variables
        events My Variables Events -> /Simulations/01-2010-LINC-MAIZ-MODE/2_MedN/outputfile/My Variables Events
    area 5_MedN-IrrigFullW -> /Simulations/23-2012-LINC-MAIZ-RAIN/1_NilN-IrrigFullW
      folder Manager folder -> /Simulations/23-2012-LINC-MAIZ-RAIN/1_NilN-IrrigFullW/Manager folder
        operations fertil_applic
          15/11/2012  fertiliser apply amount= 50 (kg/ha), type= urea_N (), depth= 10 (mm)
          20/12/2012  fertiliser apply amount= 100 (kg/ha), type= urea_N (), depth= 10 (mm)
          31/01/2013  fertiliser apply amount= 100 (kg/ha), type= urea_N (), depth= 10 (mm)
          17/03/2008    (end_of_day)
          1/09/2009    (end_of_day)
          2/03/2009    (end_of_day)
          8/06/2009    (end_of_day)
          6/10/2009    (end_of_day)
        operations irrig_applic
          24/10/2012  irrigation apply amount= 16 (mm)
          26/10/2012  irrigation apply amount= 10 (mm)
          3/11/2012  irrigation apply amount= 13 (mm)
          11/11/2012  irrigation apply amount= 19.5 (mm)
          15/11/2012  irrigation apply amount= 3.1 (mm)
          23/11/2012  irrigation apply amount= 20 (mm)
          29/11/2012  irrigation apply amount= 20 (mm)
          30/11/2012  irrigation apply amount= 30 (mm)
          13/12/2012  irrigation apply amount= 19 (mm)
          20/12/2012  irrigation apply amount= 26 (mm)
          20/12/2012  irrigation apply amount= 4 (mm)
          27/12/2012  irrigation apply amount= 22 (mm)
          3/01/2013  irrigation apply amount= 39.7 (mm)
          10/01/2013  irrigation apply amount= 42.1 (mm)
          17/01/2013  irrigation apply amount= 46.2 (mm)
          24/01/2013  irrigation apply amount= 44.7 (mm)
          31/01/2013  irrigation apply amount= 44.7 (mm)
          31/01/2013  irrigation apply amount= 4.3 (mm)
          7/02/2013  irrigation apply amount= 37 (mm)
          14/02/2013  irrigation apply amount= 38 (mm)
          21/02/2013  irrigation apply amount= 38 (mm)
          28/02/2013  irrigation apply amount= 33.4 (mm)
          7/03/2013  irrigation apply amount= 39.7 (mm)
          14/03/2013  irrigation apply amount= 31.3 (mm)
          21/03/2013  irrigation apply amount= 24 (mm)
          28/03/2013  irrigation apply amount= 34 (mm)
          4/04/2013  irrigation apply amount= 27.5 (mm)
          17/03/2008    (end_of_day)
          1/09/2009    (end_of_day)
          2/03/2009    (end_of_day)
          8/06/2009    (end_of_day)
          6/10/2009    (end_of_day)
      manager SimCode
        on init:
```
ExpNo = 23
TreatNo = 5
```
      outputfile -> /Simulations/01-2010-LINC-MAIZ-MODE/2_MedN/outputfile: filename=23-2012-LINC-MAIZ-RAIN 5_MedN-IrrigFullW.out; title=23-2012-LINC-MAIZ-RAIN 5_MedN-IrrigFullW
        variables My Variables -> /Simulations/01-2010-LINC-MAIZ-MODE/2_MedN/outputfile/My Variables
        events My Variables Events -> /Simulations/01-2010-LINC-MAIZ-MODE/2_MedN/outputfile/My Variables Events
    area 6_MedN-DryW -> /Simulations/23-2012-LINC-MAIZ-RAIN/1_NilN-IrrigFullW
      folder Manager folder -> /Simulations/23-2012-LINC-MAIZ-RAIN/1_NilN-IrrigFullW/Manager folder
        operations fertil_applic: same as 23-2012-LINC-MAIZ-RAIN.5_MedN-IrrigFullW.Manager folder.fertil_applic
        operations irrig_applic
          24/10/2012  irrigation apply amount= 16 (mm)
          26/10/2012  irrigation apply amount= 10 (mm)
          3/11/2012  irrigation apply amount= 13 (mm)
          11/11/2012  irrigation apply amount= 19.5 (mm)
          15/11/2012  irrigation apply amount= 3.1 (mm)
          23/11/2012  irrigation apply amount= 20 (mm)
          29/11/2012  irrigation apply amount= 20 (mm)
          20/12/2012  irrigation apply amount= 4 (mm)
          31/01/2013  irrigation apply amount= 4.3 (mm)
          17/03/2008    (end_of_day)
          1/09/2009    (end_of_day)
          2/03/2009    (end_of_day)
          8/06/2009    (end_of_day)
          6/10/2009    (end_of_day)
      manager SimCode
        on init:
```
ExpNo = 23
TreatNo = 6
```
      outputfile -> /Simulations/01-2010-LINC-MAIZ-MODE/2_MedN/outputfile: filename=23-2012-LINC-MAIZ-RAIN 6_MedN-DryW.out; title=23-2012-LINC-MAIZ-RAIN 6_MedN-DryW
        variables My Variables -> /Simulations/01-2010-LINC-MAIZ-MODE/2_MedN/outputfile/My Variables
        events My Variables Events -> /Simulations/01-2010-LINC-MAIZ-MODE/2_MedN/outputfile/My Variables Events
  simulation 02-2008-LINC-MAIZ-PLAS
    metfile met: filename=lincoln.met
    clock
      start_date = 01/06/2008  # Enter the start date of the simulation
      end_date = 15/06/2009  # Enter the end date of the simulation
    summaryfile
    memo
      Not done yet......needs to be set-up, parametised etc

      Note that final harvests are at silage maturity (not physiological maturity) --> not sure if simulation needs to be set-up differently??

      TREATMENTS:
      Variety (hybrid)
      - 34K77
      - 39G12

      Mulch
      - Bare
      - Plastic

      Sow
      - Early = 17/9/08 --> Note that plant population = 10.52/m2
      - Late = 12/11/08 --> Note that plant population = 11.58/m2

      VARIABLES:
      Biomass
      - AboveDM
      - StemDM
      - LeafDM
      - StemLeafDM --> still need simulated data
      - RachisHuskDM --> still need simulated data
      - GrainDM

      LeafNo
      - LeafTips
      - LeafLigules

      Phenology
      - Silk (Note that early sow treatments have no silk data)

      LightInt --> still need simulated data

      EAH added observed data and filters for all treatment levels, and treatment/variable info into memo
    area 1_34K77-Bare-EarlySow
      Soil paparoa_silt_loam: SoilType=lignin_FOM; Region=Generic soil types; State=Canterbury; Latitude=999999; Longitude=999999
        DataSource=Profile descriptions provided by Trevor Webb and data for functional horizions based on SWAMP project results
        InitialWater Initial water: FractionFull=0.8; PercentMethod=EvenlyDistributed; RelativeTo=ll15
        Water: same as 01-2010-LINC-MAIZ-MODE.1_NilN.paparoa_silt_loam.Water
        SoilWater: same as 01-2010-LINC-MAIZ-MODE.1_NilN.paparoa_silt_loam.SoilWater
        SoilOrganicMatter: same as 01-2010-LINC-MAIZ-MODE.1_NilN.paparoa_silt_loam.SoilOrganicMatter
        Analysis: PHUnits=Water; BoronUnits=HotWater
          Thickness  Rocks  PH
          200        0      6
          200        0      6
          200        0      6
          300        0      6
          300        0      6
          300        0      6
        Sample Initial nitrogen: same as 01-2010-LINC-MAIZ-MODE.1_NilN.paparoa_silt_loam.Initial nitrogen
      irrigation: same as 01-2010-LINC-MAIZ-MODE.1_NilN.Irrigation
      surfaceom SurfaceOrganicMatter
        PoolName = fieldpea  # Organic Matter pool name
        type = fieldpea  # Organic Matter type
        mass = 0  # Initial surface residue (kg/ha)
        cnr = 40  # C:N ratio of initial residue
        standing_fraction = 0  # Fraction of residue standing
      fertiliser
      folder Manager folder
        operations sow_harvest
          17/09/2008  maize sow plants = 10.52, sowing_depth = 50, cultivar = Pioneer_34K77, row_spacing = 800, crop_class = plant
          24/04/2009  maize harvest height = 0.1 (mm)
          24/04/2009  maize end_crop
        operations fertil_applic
          16/09/2008  fertiliser apply amount= 140.5 (kg/ha), type=urea_N (), depth= 10 (mm)
          17/12/2008  fertiliser apply amount= 161 (kg/ha), type= urea_N (), depth= 10 (mm)
          17/03/2008    (end_of_day)
          1/09/2009    (end_of_day)
          2/03/2009    (end_of_day)
          8/06/2009    (end_of_day)
          6/10/2009    (end_of_day)
        operations irrig_applic
          21/10/2008  irrigation apply amount= 15 (mm)
          29/10/2008  irrigation apply amount= 10 (mm)
          18/11/2008  irrigation apply amount= 10 (mm)
          27/11/2008  irrigation apply amount= 30 (mm)
          2/12/2008  irrigation apply amount= 25 (mm)
          9/12/2008  irrigation apply amount= 25 (mm)
          30/12/2008  irrigation apply amount= 30 (mm)
          6/01/2009  irrigation apply amount= 25 (mm)
          13/01/2009  irrigation apply amount= 10 (mm)
          26/01/2009  irrigation apply amount= 25 (mm)
          29/01/2009  irrigation apply amount= 25 (mm)
          4/02/2009  irrigation apply amount= 20 (mm)
          10/02/2009  irrigation apply amount= 25 (mm)
          18/03/2009  irrigation apply amount= 30 (mm)
          17/03/2008    (end_of_day)
          1/09/2009    (end_of_day)
          2/03/2009    (end_of_day)
          8/06/2009    (end_of_day)
          6/10/2009    (end_of_day)
        manager Report Variables: same as 23-2012-LINC-MAIZ-RAIN.1_NilN-IrrigFullW.Manager folder.Report Variables
      maize
        ini: filename=MaizeValidation.xml
      manager SimCode
        on init:
```
ExpNo = 2
TreatNo = 1
```
      outputfile -> /Simulations/01-2010-LINC-MAIZ-MODE/2_MedN/outputfile: filename=02-2008-LINC-MAIZ-PLAS 1_34K77-Bare-EarlySow.out; title=02-2008-LINC-MAIZ-PLAS 1_34K77-Bare-EarlySow
        variables My Variables -> /Simulations/01-2010-LINC-MAIZ-MODE/2_MedN/outputfile/My Variables
        events My Variables Events -> /Simulations/01-2010-LINC-MAIZ-MODE/2_MedN/outputfile/My Variables Events
    area 2_34K77-Plastic-EarlySow -> /Simulations/02-2008-LINC-MAIZ-PLAS/1_34K77-Bare-EarlySow
      folder Manager folder -> /Simulations/02-2008-LINC-MAIZ-PLAS/1_34K77-Bare-EarlySow/Manager folder
        operations sow_harvest
          17/09/2008  maize sow plants = 10.52, sowing_depth = 50, cultivar = Pioneer_34K77, row_spacing = 800, crop_class = plant
          23/03/2009  maize harvest height = 0.1 (mm)
          23/03/2009  maize end_crop
      manager SimCode
        on init:
```
ExpNo = 2
TreatNo = 2
```
      outputfile -> /Simulations/01-2010-LINC-MAIZ-MODE/2_MedN/outputfile: filename=02-2008-LINC-MAIZ-PLAS 2_34K77-Plastic-EarlySow.out; title=02-2008-LINC-MAIZ-PLAS 2_34K77-Plastic-EarlySow
        variables My Variables -> /Simulations/01-2010-LINC-MAIZ-MODE/2_MedN/outputfile/My Variables
        events My Variables Events -> /Simulations/01-2010-LINC-MAIZ-MODE/2_MedN/outputfile/My Variables Events
    area 3_34K77-Bare-LateSow -> /Simulations/02-2008-LINC-MAIZ-PLAS/1_34K77-Bare-EarlySow
      folder Manager folder -> /Simulations/02-2008-LINC-MAIZ-PLAS/1_34K77-Bare-EarlySow/Manager folder
        operations sow_harvest
          12/11/2008  maize sow plants = 11.58, sowing_depth = 50, cultivar = Pioneer_34K77, row_spacing = 800, crop_class = plant
          24/04/2009  maize harvest height = 0.1 (mm)
          24/04/2009  maize end_crop
        operations fertil_applic
          10/11/2008  fertiliser apply amount= 140.5 (kg/ha), type= urea_N (), depth= 10 (mm)
          13/01/2009  fertiliser apply amount= 161 (kg/ha), type= urea_N (), depth= 10 (mm)
          17/03/2008    (end_of_day)
          1/09/2009    (end_of_day)
          2/03/2009    (end_of_day)
          8/06/2009    (end_of_day)
          6/10/2009    (end_of_day)
      manager SimCode
        on init:
```
ExpNo = 2
TreatNo = 3
```
      outputfile -> /Simulations/01-2010-LINC-MAIZ-MODE/2_MedN/outputfile: filename=02-2008-LINC-MAIZ-PLAS 3_34K77-Bare-LateSow.out; title=02-2008-LINC-MAIZ-PLAS 3_34K77-Bare-LateSow
        variables My Variables -> /Simulations/01-2010-LINC-MAIZ-MODE/2_MedN/outputfile/My Variables
        events My Variables Events -> /Simulations/01-2010-LINC-MAIZ-MODE/2_MedN/outputfile/My Variables Events
    area 4_34K77-Plastic-LateSow -> /Simulations/02-2008-LINC-MAIZ-PLAS/1_34K77-Bare-EarlySow
      folder Manager folder -> /Simulations/02-2008-LINC-MAIZ-PLAS/1_34K77-Bare-EarlySow/Manager folder
        operations sow_harvest: same as 02-2008-LINC-MAIZ-PLAS.3_34K77-Bare-LateSow.Manager folder.sow_harvest
        operations fertil_applic: same as 02-2008-LINC-MAIZ-PLAS.3_34K77-Bare-LateSow.Manager folder.fertil_applic
      manager SimCode
        on init:
```
ExpNo = 2
TreatNo = 4
```
      outputfile -> /Simulations/01-2010-LINC-MAIZ-MODE/2_MedN/outputfile: filename=02-2008-LINC-MAIZ-PLAS 4_34K77-Plastic-LateSow.out; title=02-2008-LINC-MAIZ-PLAS 4_34K77-Plastic-LateSow
        variables My Variables -> /Simulations/01-2010-LINC-MAIZ-MODE/2_MedN/outputfile/My Variables
        events My Variables Events -> /Simulations/01-2010-LINC-MAIZ-MODE/2_MedN/outputfile/My Variables Events
    area 5_39G12-Bare-EarlySow -> /Simulations/02-2008-LINC-MAIZ-PLAS/1_34K77-Bare-EarlySow
      folder Manager folder -> /Simulations/02-2008-LINC-MAIZ-PLAS/1_34K77-Bare-EarlySow/Manager folder
        operations sow_harvest
          17/09/2008  maize sow plants = 10.52, sowing_depth = 50, cultivar = Pioneer_39G12, row_spacing = 800, crop_class = plant
          23/03/2009  maize harvest height = 0.1 (mm)
          23/03/2009  maize end_crop
      manager SimCode
        on init:
```
ExpNo = 2
TreatNo = 5
```
      outputfile -> /Simulations/01-2010-LINC-MAIZ-MODE/2_MedN/outputfile: filename=02-2008-LINC-MAIZ-PLAS 5_39G12-Bare-EarlySow.out; title=02-2008-LINC-MAIZ-PLAS 5_39G12-Bare-EarlySow
        variables My Variables -> /Simulations/01-2010-LINC-MAIZ-MODE/2_MedN/outputfile/My Variables
        events My Variables Events -> /Simulations/01-2010-LINC-MAIZ-MODE/2_MedN/outputfile/My Variables Events
    area 6_39G12-Plastic-EarlySow -> /Simulations/02-2008-LINC-MAIZ-PLAS/1_34K77-Bare-EarlySow
      folder Manager folder -> /Simulations/02-2008-LINC-MAIZ-PLAS/1_34K77-Bare-EarlySow/Manager folder
        operations sow_harvest
          17/09/2008  maize sow plants = 10.52, sowing_depth = 50, cultivar = Pioneer_39G12, row_spacing = 800, crop_class = plant
          6/03/2009  maize harvest height = 0.1 (mm)
          6/03/2009  maize end_crop
      manager SimCode
        on init:
```
ExpNo = 2
TreatNo = 6
```
      outputfile -> /Simulations/01-2010-LINC-MAIZ-MODE/2_MedN/outputfile: filename=02-2008-LINC-MAIZ-PLAS 6_39G12-Plastic-EarlySow.out; title=02-2008-LINC-MAIZ-PLAS 6_39G12-Plastic-EarlySow
        variables My Variables -> /Simulations/01-2010-LINC-MAIZ-MODE/2_MedN/outputfile/My Variables
        events My Variables Events -> /Simulations/01-2010-LINC-MAIZ-MODE/2_MedN/outputfile/My Variables Events
    area 7_39G12-Bare-LateSow -> /Simulations/02-2008-LINC-MAIZ-PLAS/1_34K77-Bare-EarlySow
      folder Manager folder -> /Simulations/02-2008-LINC-MAIZ-PLAS/1_34K77-Bare-EarlySow/Manager folder
        operations sow_harvest
          12/11/2008  maize sow plants = 11.58, sowing_depth = 50, cultivar = Pioneer_39G12, row_spacing = 800, crop_class = plant
          24/04/2009  maize harvest height = 0.1 (mm)
          24/04/2009  maize end_crop
        operations fertil_applic: same as 02-2008-LINC-MAIZ-PLAS.3_34K77-Bare-LateSow.Manager folder.fertil_applic
      manager SimCode
        on init:
```
ExpNo = 2
TreatNo = 7
```
      outputfile -> /Simulations/01-2010-LINC-MAIZ-MODE/2_MedN/outputfile: filename=02-2008-LINC-MAIZ-PLAS 7_39G12-Bare-LateSow.out; title=02-2008-LINC-MAIZ-PLAS 7_39G12-Bare-LateSow
        variables My Variables -> /Simulations/01-2010-LINC-MAIZ-MODE/2_MedN/outputfile/My Variables
        events My Variables Events -> /Simulations/01-2010-LINC-MAIZ-MODE/2_MedN/outputfile/My Variables Events
    area 8_39G12-Plastic-LateSow -> /Simulations/02-2008-LINC-MAIZ-PLAS/1_34K77-Bare-EarlySow
      folder Manager folder -> /Simulations/02-2008-LINC-MAIZ-PLAS/1_34K77-Bare-EarlySow/Manager folder
        operations sow_harvest
          12/11/2008  maize sow plants = 11.58, sowing_depth = 50, cultivar = Pioneer_39G12, row_spacing = 800, crop_class = plant
          3/04/2009  maize harvest height = 0.1 (mm)
          3/04/2009  maize end_crop
        operations fertil_applic: same as 02-2008-LINC-MAIZ-PLAS.3_34K77-Bare-LateSow.Manager folder.fertil_applic
      manager SimCode
        on init:
```
ExpNo = 2
TreatNo = 8
```
      outputfile -> /Simulations/01-2010-LINC-MAIZ-MODE/2_MedN/outputfile: filename=02-2008-LINC-MAIZ-PLAS 8_39G12-Plastic-LateSow.out; title=02-2008-LINC-MAIZ-PLAS 8_39G12-Plastic-LateSow
        variables My Variables -> /Simulations/01-2010-LINC-MAIZ-MODE/2_MedN/outputfile/My Variables
        events My Variables Events -> /Simulations/01-2010-LINC-MAIZ-MODE/2_MedN/outputfile/My Variables Events
  simulation 15-2010-HAWK-MAIZ-HYBR
    metfile met: filename=%apsim%\Examples\MetFiles\lincoln.met
    clock
      start_date = 01/10/2010  # Enter the start date of the simulation
      end_date = 30/05/2011  # Enter the end date of the simulation
    summaryfile
    memo
      Not done yet......needs to be set-up, parametised etc

      TREATMENTS:
      Variety/hybrid
      - 39V43
      - 38H20
      - 33M54

      Sow
      - Early = 4th Oct
      - Mid = 1st Nov
      - Late = 1st Dec

      VARIABLES:
      Biomass
      - AboveDM
      - StemDM
      - LeafDM
      - RachisDM --> still need simulated data
      - HuskDM --> still need simulated data
      - RachisHuskDM --> still need simulated data
      - GrainDM
      - EarDM --> still need simulated data

      LAI

      LeafNo
      - LeafTips
      - LeafLigules

      Phenology
      - Emerge
      - Silk
      - Tassel

      LightInt --> still need simulated data

      EAH added observed data and filters for all treatment levels, and treatment/variable info into memo
    area 1_39V43-EarlySow
      Soil paparoa_silt_loam: Region=Generic soil types; State=Canterbury; Latitude=999999; Longitude=999999
        DataSource=Profile descriptions provided by Trevor Webb and data for functional horizions based on SWAMP project results
        SoilType = lignin_FOM  # Soil description
        InitialWater Initial water: FractionFull=1; PercentMethod=EvenlyDistributed
        Water: same as 01-2010-LINC-MAIZ-MODE.1_NilN.paparoa_silt_loam.Water
        SoilWater: same as 01-2010-LINC-MAIZ-MODE.1_NilN.paparoa_silt_loam.SoilWater
        SoilOrganicMatter: same as 01-2010-LINC-MAIZ-MODE.1_NilN.paparoa_silt_loam.SoilOrganicMatter
        Analysis: PHUnits=Water; BoronUnits=HotWater
          Thickness  Rocks  PH
          200        0      6
          200        0      6
          200        0      6
          300        0      6
          300        0      6
          300        0      6
        Sample Initial nitrogen: same as 01-2010-LINC-MAIZ-MODE.1_NilN.paparoa_silt_loam.Initial nitrogen
      irrigation: same as 01-2010-LINC-MAIZ-MODE.1_NilN.Irrigation
      surfaceom SurfaceOrganicMatter
        PoolName = wheat  # Organic Matter pool name
        type = wheat  # Organic Matter type
        mass = 0  # Initial surface residue (kg/ha)
        cnr = 80  # C:N ratio of initial residue
        standing_fraction = 0  # Fraction of residue standing
      fertiliser
      folder Manager folder
        operations sow_harvest
          4/10/2010  maize sow plants =12, sowing_depth = 80, cultivar = Pioneer_39V43, row_spacing = 760, crop_class = plant
          17/03/2011  maize harvest height = 0.1 (mm)
          17/03/2011  maize end_crop
        operations fertil_applic
          29/09/2010  fertiliser apply amount= 87.5 (kg/ha), type=urea_N (), depth= 10 (mm)
          17/03/2008    (end_of_day)
          1/09/2009    (end_of_day)
          2/03/2009    (end_of_day)
          8/06/2009    (end_of_day)
          6/10/2009    (end_of_day)
        operations irrig_applic
          16/11/2010  irrigation apply amount= 60 (mm)
          6/12/2010  irrigation apply amount= 40 (mm)
          20/01/2011  irrigation apply amount= 40 (mm)
          17/03/2008    (end_of_day)
          1/09/2009    (end_of_day)
          2/03/2009    (end_of_day)
          8/06/2009    (end_of_day)
          6/10/2009    (end_of_day)
        manager Report Variables: same as 23-2012-LINC-MAIZ-RAIN.1_NilN-IrrigFullW.Manager folder.Report Variables
      maize
        ini: filename=MaizeValidation.xml
      manager SimCode
        on init:
```
ExpNo = 15
TreatNo = 1
```
      outputfile -> /Simulations/01-2010-LINC-MAIZ-MODE/2_MedN/outputfile: filename=15-2010-HAWK-MAIZ-HYBR 1_39V43-EarlySow.out; title=15-2010-HAWK-MAIZ-HYBR 1_39V43-EarlySow
        variables My Variables -> /Simulations/01-2010-LINC-MAIZ-MODE/2_MedN/outputfile/My Variables
        events My Variables Events -> /Simulations/01-2010-LINC-MAIZ-MODE/2_MedN/outputfile/My Variables Events
    area 2_39V43-MidSow -> /Simulations/15-2010-HAWK-MAIZ-HYBR/1_39V43-EarlySow
      folder Manager folder -> /Simulations/15-2010-HAWK-MAIZ-HYBR/1_39V43-EarlySow/Manager folder
        operations sow_harvest
          1/11/2010  maize sow plants =12, sowing_depth = 80, cultivar = Pioneer_39V43, row_spacing = 760, crop_class = plant
          25/03/2011  maize harvest height = 0.1 (mm)
          25/03/2011  maize end_crop
        operations fertil_applic
          28/10/2010  fertiliser apply amount= 87.5 (kg/ha), type=urea_N (), depth= 10 (mm)
          17/03/2008    (end_of_day)
          1/09/2009    (end_of_day)
          2/03/2009    (end_of_day)
          8/06/2009    (end_of_day)
          6/10/2009    (end_of_day)
      manager SimCode
        on init:
```
ExpNo = 15
TreatNo = 2
```
      outputfile -> /Simulations/01-2010-LINC-MAIZ-MODE/2_MedN/outputfile: filename=15-2010-HAWK-MAIZ-HYBR 2_39V43-MidSow.out; title=15-2010-HAWK-MAIZ-HYBR 2_39V43-MidSow
        variables My Variables -> /Simulations/01-2010-LINC-MAIZ-MODE/2_MedN/outputfile/My Variables
        events My Variables Events -> /Simulations/01-2010-LINC-MAIZ-MODE/2_MedN/outputfile/My Variables Events
    area 3_39V43-LateSow -> /Simulations/15-2010-HAWK-MAIZ-HYBR/1_39V43-EarlySow
      folder Manager folder -> /Simulations/15-2010-HAWK-MAIZ-HYBR/1_39V43-EarlySow/Manager folder
        operations sow_harvest
          1/12/2010  maize sow plants =12, sowing_depth = 80, cultivar = Pioneer_39V43, row_spacing = 760, crop_class = plant
          15/04/2011  maize harvest height = 0.1 (mm)
          15/04/2011  maize end_crop
        operations fertil_applic
          29/11/2010  fertiliser apply amount= 87.5 (kg/ha), type=urea_N (), depth= 10 (mm)
          17/03/2008    (end_of_day)
          1/09/2009    (end_of_day)
          2/03/2009    (end_of_day)
          8/06/2009    (end_of_day)
          6/10/2009    (end_of_day)
      manager SimCode
        on init:
```
ExpNo = 15
TreatNo = 3
```
      outputfile -> /Simulations/01-2010-LINC-MAIZ-MODE/2_MedN/outputfile: filename=15-2010-HAWK-MAIZ-HYBR 3_39V43-LateSow.out; title=15-2010-HAWK-MAIZ-HYBR 3_39V43-LateSow
        variables My Variables -> /Simulations/01-2010-LINC-MAIZ-MODE/2_MedN/outputfile/My Variables
        events My Variables Events -> /Simulations/01-2010-LINC-MAIZ-MODE/2_MedN/outputfile/My Variables Events
    area 4_38H20-EarlySow -> /Simulations/15-2010-HAWK-MAIZ-HYBR/1_39V43-EarlySow
      folder Manager folder -> /Simulations/15-2010-HAWK-MAIZ-HYBR/1_39V43-EarlySow/Manager folder
        operations sow_harvest
          4/10/2010  maize sow plants =12, sowing_depth = 80, cultivar = Pioneer_38H20, row_spacing = 760, crop_class = plant
          17/03/2011  maize harvest height = 0.1 (mm)
          17/03/2011  maize end_crop
      manager SimCode
        on init:
```
ExpNo = 15
TreatNo = 4
```
      outputfile -> /Simulations/01-2010-LINC-MAIZ-MODE/2_MedN/outputfile: filename=15-2010-HAWK-MAIZ-HYBR 4_38H20-EarlySow.out; title=15-2010-HAWK-MAIZ-HYBR 4_38H20-EarlySow
        variables My Variables -> /Simulations/01-2010-LINC-MAIZ-MODE/2_MedN/outputfile/My Variables
        events My Variables Events -> /Simulations/01-2010-LINC-MAIZ-MODE/2_MedN/outputfile/My Variables Events
    area 5_38H20-MidSow -> /Simulations/15-2010-HAWK-MAIZ-HYBR/1_39V43-EarlySow
      folder Manager folder -> /Simulations/15-2010-HAWK-MAIZ-HYBR/1_39V43-EarlySow/Manager folder
        operations sow_harvest
          1/11/2010  maize sow plants =12, sowing_depth = 80, cultivar = Pioneer_38H20, row_spacing = 760, crop_class = plant
          21/04/2011  maize harvest height = 0.1 (mm)
          21/04/2011  maize end_crop
        operations fertil_applic: same as 15-2010-HAWK-MAIZ-HYBR.2_39V43-MidSow.Manager folder.fertil_applic
      manager SimCode
        on init:
```
ExpNo = 15
TreatNo = 5
```
      outputfile -> /Simulations/01-2010-LINC-MAIZ-MODE/2_MedN/outputfile: filename=15-2010-HAWK-MAIZ-HYBR 5_38H20-MidSow.out; title=15-2010-HAWK-MAIZ-HYBR 5_38H20-MidSow
        variables My Variables -> /Simulations/01-2010-LINC-MAIZ-MODE/2_MedN/outputfile/My Variables
        events My Variables Events -> /Simulations/01-2010-LINC-MAIZ-MODE/2_MedN/outputfile/My Variables Events
    area 6_38H20-LateSow -> /Simulations/15-2010-HAWK-MAIZ-HYBR/1_39V43-EarlySow
      folder Manager folder -> /Simulations/15-2010-HAWK-MAIZ-HYBR/1_39V43-EarlySow/Manager folder
        operations sow_harvest
          01/12/2010  maize sow plants =12, sowing_depth = 80, cultivar = Pioneer_38H20, row_spacing = 760, crop_class = plant
          6/05/2011  maize harvest height = 0.1 (mm)
          6/05/2011  maize end_crop
        operations fertil_applic: same as 15-2010-HAWK-MAIZ-HYBR.3_39V43-LateSow.Manager folder.fertil_applic
      manager SimCode
        on init:
```
ExpNo = 15
TreatNo = 6
```
      outputfile -> /Simulations/01-2010-LINC-MAIZ-MODE/2_MedN/outputfile: filename=15-2010-HAWK-MAIZ-HYBR 6_38H20-LateSow.out; title=15-2010-HAWK-MAIZ-HYBR 6_38H20-LateSow
        variables My Variables -> /Simulations/01-2010-LINC-MAIZ-MODE/2_MedN/outputfile/My Variables
        events My Variables Events -> /Simulations/01-2010-LINC-MAIZ-MODE/2_MedN/outputfile/My Variables Events
    area 7_33M54-EarlySow -> /Simulations/15-2010-HAWK-MAIZ-HYBR/1_39V43-EarlySow
      folder Manager folder -> /Simulations/15-2010-HAWK-MAIZ-HYBR/1_39V43-EarlySow/Manager folder
        operations sow_harvest
          4/10/2010  maize sow plants =12, sowing_depth = 80, cultivar = Pioneer_33M54, row_spacing = 760, crop_class = plant
          12/04/2011  maize harvest height = 0.1 (mm)
          12/04/2011  maize end_crop
      manager SimCode
        on init:
```
ExpNo = 15
TreatNo = 7
```
      outputfile -> /Simulations/01-2010-LINC-MAIZ-MODE/2_MedN/outputfile: filename=15-2010-HAWK-MAIZ-HYBR 7_33M54-EarlySow.out; title=15-2010-HAWK-MAIZ-HYBR 7_33M54-EarlySow
        variables My Variables -> /Simulations/01-2010-LINC-MAIZ-MODE/2_MedN/outputfile/My Variables
        events My Variables Events -> /Simulations/01-2010-LINC-MAIZ-MODE/2_MedN/outputfile/My Variables Events
    area 8_33M54-MidSow -> /Simulations/15-2010-HAWK-MAIZ-HYBR/1_39V43-EarlySow
      folder Manager folder -> /Simulations/15-2010-HAWK-MAIZ-HYBR/1_39V43-EarlySow/Manager folder
        operations sow_harvest
          1/11/2010  maize sow plants =12, sowing_depth = 80, cultivar = Pioneer_33M54, row_spacing = 760, crop_class = plant
          6/05/2011  maize harvest height = 0.1 (mm)
          6/05/2011  maize end_crop
        operations fertil_applic: same as 15-2010-HAWK-MAIZ-HYBR.2_39V43-MidSow.Manager folder.fertil_applic
      manager SimCode
        on init:
```
ExpNo = 15
TreatNo = 8
```
      outputfile -> /Simulations/01-2010-LINC-MAIZ-MODE/2_MedN/outputfile: filename=15-2010-HAWK-MAIZ-HYBR 8_33M54-MidSow.out; title=15-2010-HAWK-MAIZ-HYBR 8_33M54-MidSow
        variables My Variables -> /Simulations/01-2010-LINC-MAIZ-MODE/2_MedN/outputfile/My Variables
        events My Variables Events -> /Simulations/01-2010-LINC-MAIZ-MODE/2_MedN/outputfile/My Variables Events
    area 9_33M54-LateSow -> /Simulations/15-2010-HAWK-MAIZ-HYBR/1_39V43-EarlySow
      folder Manager folder -> /Simulations/15-2010-HAWK-MAIZ-HYBR/1_39V43-EarlySow/Manager folder
        operations sow_harvest
          1/12/2010  maize sow plants =12, sowing_depth = 80, cultivar = Pioneer_33M54, row_spacing = 760, crop_class = plant
          20/05/2011  maize harvest height = 0.1 (mm)
          20/05/2011  maize end_crop
        operations fertil_applic: same as 15-2010-HAWK-MAIZ-HYBR.3_39V43-LateSow.Manager folder.fertil_applic
      manager SimCode
        on init:
```
ExpNo = 15
TreatNo = 9
```
      outputfile -> /Simulations/01-2010-LINC-MAIZ-MODE/2_MedN/outputfile: filename=15-2010-HAWK-MAIZ-HYBR 9_33M54-LateSow.out; title=15-2010-HAWK-MAIZ-HYBR 9_33M54-LateSow
        variables My Variables -> /Simulations/01-2010-LINC-MAIZ-MODE/2_MedN/outputfile/My Variables
        events My Variables Events -> /Simulations/01-2010-LINC-MAIZ-MODE/2_MedN/outputfile/My Variables Events
  simulation 03-2007-LINC-MAIZ-PLAS
    metfile met: filename=lincoln.met
    clock
      start_date = 01/10/2007  # Enter the start date of the simulation
      end_date = 15/04/2008  # Enter the end date of the simulation
    summaryfile
    memo
      Not done yet......needs to be set-up, parametised etc

      TREATMENTS:
      Variety (hybrid)
      - 38H20
      - 39G12

      Mulch
      - Bare
      - Plastic

      VARIABLES:
      Biomass
      - AboveDM
      - StemDM
      - LeafDM
      - RachisDM --> still need simulated data
      - HuskDM --> still need simulated data
      - GrainDM

      LeafNo
      - LeafTips
      - LeafLigules

      Phenology
      - Silk

      LightInt --> still need simulated data

      EAH added observed data and filters for all treatment levels, and treatment/variable info into memo
    area 1_38H20-Bare
      Soil paparoa_silt_loam: same as 01-2010-LINC-MAIZ-MODE.1_NilN.paparoa_silt_loam
      irrigation: same as 01-2010-LINC-MAIZ-MODE.1_NilN.Irrigation
      surfaceom SurfaceOrganicMatter
        PoolName = fieldpea  # Organic Matter pool name
        type = fieldpea  # Organic Matter type
        mass = 0  # Initial surface residue (kg/ha)
        cnr = 40  # C:N ratio of initial residue
        standing_fraction = 0  # Fraction of residue standing
      fertiliser
      folder Manager folder
        operations sow_harvest
          24/10/2007  maize sow plants =11.6, sowing_depth = 50, cultivar = Pioneer_38H20, row_spacing = 800, crop_class = plant
          31/03/2008  maize harvest height = 0.1 (mm)
          31/03/2008  maize end_crop
        operations fertil_applic
          22/10/2007  fertiliser apply amount= 86 (kg/ha), type=urea_N (), depth= 10 (mm)
          19/12/2007  fertiliser apply amount= 161 (kg/ha), type=urea_N (), depth= 10 (mm)
          17/03/2008    (end_of_day)
          1/09/2009    (end_of_day)
          2/03/2009    (end_of_day)
          8/06/2009    (end_of_day)
          6/10/2009    (end_of_day)
        operations irrig_applic
          9/11/2007  irrigation apply amount= 10 (mm)
          22/11/2007  irrigation apply amount= 25 (mm)
          19/12/2007  irrigation apply amount= 30 (mm)
          5/01/2008  irrigation apply amount= 40 (mm)
          14/01/2008  irrigation apply amount= 40 (mm)
          28/01/2008  irrigation apply amount= 40 (mm)
          11/02/2008  irrigation apply amount= 40 (mm)
          12/03/2008  irrigation apply amount= 30 (mm)
          17/03/2008    (end_of_day)
          1/09/2009    (end_of_day)
          2/03/2009    (end_of_day)
          8/06/2009    (end_of_day)
          6/10/2009    (end_of_day)
        manager Report Variables: same as 23-2012-LINC-MAIZ-RAIN.1_NilN-IrrigFullW.Manager folder.Report Variables
      maize
        ini: filename=MaizeValidation.xml
      manager SimCode
        on init:
```
ExpNo = 3
TreatNo = 1
```
      outputfile -> /Simulations/01-2010-LINC-MAIZ-MODE/2_MedN/outputfile: filename=03-2007-LINC-MAIZ-PLAS 1_38H20-Bare.out; title=03-2007-LINC-MAIZ-PLAS 1_38H20-Bare
        variables My Variables -> /Simulations/01-2010-LINC-MAIZ-MODE/2_MedN/outputfile/My Variables
        events My Variables Events -> /Simulations/01-2010-LINC-MAIZ-MODE/2_MedN/outputfile/My Variables Events
    area 2_38H20-Plastic -> /Simulations/03-2007-LINC-MAIZ-PLAS/1_38H20-Bare
      folder Manager folder -> /Simulations/03-2007-LINC-MAIZ-PLAS/1_38H20-Bare/Manager folder
        operations sow_harvest
          24/10/2007  maize sow plants =11.6, sowing_depth = 50, cultivar = Pioneer_38H20, row_spacing = 800, crop_class = plant
          25/03/2008  maize harvest height = 0.1 (mm)
          25/03/2008  maize end_crop
      manager SimCode
        on init:
```
ExpNo = 3
TreatNo = 2
```
      outputfile -> /Simulations/01-2010-LINC-MAIZ-MODE/2_MedN/outputfile: filename=03-2007-LINC-MAIZ-PLAS 2_38H20-Plastic.out; title=03-2007-LINC-MAIZ-PLAS 2_38H20-Plastic
        variables My Variables -> /Simulations/01-2010-LINC-MAIZ-MODE/2_MedN/outputfile/My Variables
        events My Variables Events -> /Simulations/01-2010-LINC-MAIZ-MODE/2_MedN/outputfile/My Variables Events
    area 3_39G12-Bare -> /Simulations/03-2007-LINC-MAIZ-PLAS/1_38H20-Bare
      folder Manager folder -> /Simulations/03-2007-LINC-MAIZ-PLAS/1_38H20-Bare/Manager folder
        operations sow_harvest
          24/10/2007  maize sow plants =11.6, sowing_depth = 50, cultivar = Pioneer_39G12, row_spacing = 800, crop_class = plant
          31/03/2008  maize harvest height = 0.1 (mm)
          31/03/2008  maize end_crop
      manager SimCode
        on init:
```
ExpNo = 3
TreatNo = 3
```
      outputfile -> /Simulations/01-2010-LINC-MAIZ-MODE/2_MedN/outputfile: filename=03-2007-LINC-MAIZ-PLAS 3_39G12-Bare.out; title=03-2007-LINC-MAIZ-PLAS 3_39G12-Bare
        variables My Variables -> /Simulations/01-2010-LINC-MAIZ-MODE/2_MedN/outputfile/My Variables
        events My Variables Events -> /Simulations/01-2010-LINC-MAIZ-MODE/2_MedN/outputfile/My Variables Events
    area 4_39G12-Plastic -> /Simulations/03-2007-LINC-MAIZ-PLAS/1_38H20-Bare
      folder Manager folder -> /Simulations/03-2007-LINC-MAIZ-PLAS/1_38H20-Bare/Manager folder
        operations sow_harvest
          24/10/2007  maize sow plants =11.6, sowing_depth = 50, cultivar = Pioneer_39G12, row_spacing = 800, crop_class = plant
          18/03/2008  maize harvest height = 0.1 (mm)
          18/03/2008  maize end_crop
      manager SimCode
        on init:
```
ExpNo = 3
TreatNo = 4
```
      outputfile -> /Simulations/01-2010-LINC-MAIZ-MODE/2_MedN/outputfile: filename=03-2007-LINC-MAIZ-PLAS 4_39G12-Plastic.out; title=03-2007-LINC-MAIZ-PLAS 4_39G12-Plastic
        variables My Variables -> /Simulations/01-2010-LINC-MAIZ-MODE/2_MedN/outputfile/My Variables
        events My Variables Events -> /Simulations/01-2010-LINC-MAIZ-MODE/2_MedN/outputfile/My Variables Events
  simulation 06-2008-LINC-MAIZ-SHYB
    metfile met: filename=lincoln.met
    clock
      start_date = 01/10/2008  # Enter the start date of the simulation
      end_date = 15/04/2009  # Enter the end date of the simulation
    summaryfile
    memo
      Not done yet......needs to be set-up, parametised etc

      TREATMENTS:
      Variety/hybrid
      - 39V43
      - 39G12
      - 39D34

      VARIABLES:
      Biomass
      - AboveDM
      - StemDM
      - LeafDM
      - RachisHuskDM --> still need simulated data
      - GrainDM

      LAI

      LeafNo
      - LeafTips
      - LeafLigules

      Phenology
      - Emerge
      - Silk

      LightInt --> still need simulated data

      EAH added observed data and filters for all treatment levels, and treatment/variable info into memo
    area 1_39V43
      Soil paparoa_silt_loam: same as 01-2010-LINC-MAIZ-MODE.1_NilN.paparoa_silt_loam
      irrigation: same as 01-2010-LINC-MAIZ-MODE.1_NilN.Irrigation
      surfaceom SurfaceOrganicMatter
        PoolName = fieldpea  # Organic Matter pool name
        type = fieldpea  # Organic Matter type
        mass = 0  # Initial surface residue (kg/ha)
        cnr = 40  # C:N ratio of initial residue
        standing_fraction = 0  # Fraction of residue standing
      fertiliser
      folder Manager folder
        operations sow_harvest
          28/10/2008  maize sow plants =12, sowing_depth = 50, cultivar = Pioneer_39V43, row_spacing = 760, crop_class = plant
          3/04/2009  maize harvest height = 0.1 (mm)
          3/04/2009  maize end_crop
        operations fertil_applic
          14/10/2008  fertiliser apply amount= 90.5 (kg/ha), type=urea_N (), depth= 10 (mm)
          17/12/2008  fertiliser apply amount= 101.2 (kg/ha), type=urea_N (), depth= 10 (mm)
              (end_of_day)
              (end_of_day)
              (end_of_day)
              (end_of_day)
              (end_of_day)
        operations irrig_applic
          21/10/2008  irrigation apply amount= 15 (mm)
          29/10/2008  irrigation apply amount= 10 (mm)
          18/11/2008  irrigation apply amount= 10 (mm)
          27/11/2008  irrigation apply amount= 30 (mm)
          2/12/2008  irrigation apply amount= 25 (mm)
          30/12/2008  irrigation apply amount= 30 (mm)
          6/01/2009  irrigation apply amount= 25 (mm)
          13/01/2009  irrigation apply amount= 10 (mm)
          26/01/2009  irrigation apply amount= 25 (mm)
          29/01/2009  irrigation apply amount= 25 (mm)
          4/02/2009  irrigation apply amount= 20 (mm)
          10/02/2009  irrigation apply amount= 25 (mm)
          18/03/2009  irrigation apply amount= 30 (mm)
          17/03/2008    (end_of_day)
          1/09/2009    (end_of_day)
          2/03/2009    (end_of_day)
          8/06/2009    (end_of_day)
          6/10/2009    (end_of_day)
        manager Report Variables: same as 23-2012-LINC-MAIZ-RAIN.1_NilN-IrrigFullW.Manager folder.Report Variables
      maize
        ini: filename=MaizeValidation.xml
      manager SimCode
        on init:
```
ExpNo = 6
TreatNo = 1
```
      outputfile -> /Simulations/01-2010-LINC-MAIZ-MODE/2_MedN/outputfile: filename=06-2008-LINC-MAIZ-SHYB 1_39V43.out; title=06-2008-LINC-MAIZ-SHYB 1_39V43
        variables My Variables -> /Simulations/01-2010-LINC-MAIZ-MODE/2_MedN/outputfile/My Variables
        events My Variables Events -> /Simulations/01-2010-LINC-MAIZ-MODE/2_MedN/outputfile/My Variables Events
    area 2_39G12 -> /Simulations/06-2008-LINC-MAIZ-SHYB/1_39V43
      folder Manager folder -> /Simulations/06-2008-LINC-MAIZ-SHYB/1_39V43/Manager folder
        operations sow_harvest
          28/10/2008  maize sow plants =12, sowing_depth = 50, cultivar = Pioneer_39G12, row_spacing = 760, crop_class = plant
          3/04/2009  maize harvest height = 0.1 (mm)
          3/04/2009  maize end_crop
      manager SimCode
        on init:
```
ExpNo = 6
TreatNo = 2
```
      outputfile -> /Simulations/01-2010-LINC-MAIZ-MODE/2_MedN/outputfile: filename=06-2008-LINC-MAIZ-SHYB 2_39G12.out; title=06-2008-LINC-MAIZ-SHYB 2_39G12
        variables My Variables -> /Simulations/01-2010-LINC-MAIZ-MODE/2_MedN/outputfile/My Variables
        events My Variables Events -> /Simulations/01-2010-LINC-MAIZ-MODE/2_MedN/outputfile/My Variables Events
    area 3_39D34 -> /Simulations/06-2008-LINC-MAIZ-SHYB/1_39V43
      folder Manager folder -> /Simulations/06-2008-LINC-MAIZ-SHYB/1_39V43/Manager folder
        operations sow_harvest
          28/10/2008  maize sow plants =12, sowing_depth = 50, cultivar = Pioneer_39D34, row_spacing = 760, crop_class = plant
          3/04/2009  maize harvest height = 0.1 (mm)
          3/04/2009  maize end_crop
      manager SimCode
        on init:
```
ExpNo = 6
TreatNo = 3
```
      outputfile -> /Simulations/01-2010-LINC-MAIZ-MODE/2_MedN/outputfile: filename=06-2008-LINC-MAIZ-SHYB 3_39D34.out; title=06-2008-LINC-MAIZ-SHYB 3_39D34
        variables My Variables -> /Simulations/01-2010-LINC-MAIZ-MODE/2_MedN/outputfile/My Variables
        events My Variables Events -> /Simulations/01-2010-LINC-MAIZ-MODE/2_MedN/outputfile/My Variables Events
  simulation 10-2009-HAWK-MAIZ-PHEN
    metfile met: filename=%apsim%\Examples\MetFiles\lincoln.met
    clock
      start_date = 01/10/2009  # Enter the start date of the simulation
      end_date = 15/06/2010  # Enter the end date of the simulation
    summaryfile
    memo
      Not done yet......needs to be set-up, parametised etc

      TREATMENTS:
      Variety/hybrid
      - 36H36
      - 38P05
      - 39G12
      - DK624
      - N51-N4
      And not included at the moment due to incomplete datasets (no LAI): 33M54, 34D71, 35Y33, 37D25, N48K2, DKC37-12, DKC5783, CTL90, CTL100, Goldfrank.

      Sow
      - Early = 2nd Nov
      - Late = 23rd Nov

      VARIABLES:
      Biomass
      - GrainDM

      LAI

      LeafNo
      - LeafTips
      - LeafLigules

      Phenology
      - Emerge
      - Silk

      EAH added observed data and filters for all treatment levels, and treatment/variable info into memo --> still to finish............
    area 1_36H36-EarlySow
      Soil paparoa_silt_loam: SoilType=lignin_FOM; Region=Generic soil types; State=Canterbury; Latitude=999999; Longitude=999999; YearOfSampling=0
        DataSource=Profile descriptions provided by Trevor Webb and data for functional horizions based on SWAMP project results
        InitialWater Initial water: FractionFull=1; PercentMethod=EvenlyDistributed
        Water: same as 01-2010-LINC-MAIZ-MODE.1_NilN.paparoa_silt_loam.Water
        SoilWater: same as 01-2010-LINC-MAIZ-MODE.1_NilN.paparoa_silt_loam.SoilWater
        SoilOrganicMatter: same as 01-2010-LINC-MAIZ-MODE.1_NilN.paparoa_silt_loam.SoilOrganicMatter
        Analysis: PHUnits=Water; BoronUnits=HotWater
          Thickness  Rocks  PH
          200        0      6
          200        0      6
          200        0      6
          300        0      6
          300        0      6
          300        0      6
        Sample Initial nitrogen: same as 01-2010-LINC-MAIZ-MODE.1_NilN.paparoa_silt_loam.Initial nitrogen
      irrigation: same as 01-2010-LINC-MAIZ-MODE.1_NilN.Irrigation
      surfaceom SurfaceOrganicMatter
        PoolName = wheat  # Organic Matter pool name
        type = wheat  # Organic Matter type
        mass = 0  # Initial surface residue (kg/ha)
        cnr = 80  # C:N ratio of initial residue
        standing_fraction = 0  # Fraction of residue standing
      fertiliser
      folder Manager folder
        operations sow_harvest
          2/11/2009  maize sow plants = 12, sowing_depth = 80, cultivar = Pioneer_36H36, row_spacing = 760, crop_class = plant
          21/04/2010  maize harvest height = 0.1 (mm)
          21/04/2010  maize end_crop
        operations fertil_applic
          14/12/2009  fertiliser apply amount= 92 (kg/ha), type=urea_N (), depth= 10 (mm)
          17/03/2008    (end_of_day)
          1/09/2009    (end_of_day)
          2/03/2009    (end_of_day)
          8/06/2009    (end_of_day)
          6/10/2009    (end_of_day)
        operations irrig_applic
          1/01/2010  irrigation apply amount= 60 (mm)
          17/03/2008    (end_of_day)
          1/09/2009    (end_of_day)
          2/03/2009    (end_of_day)
          8/06/2009    (end_of_day)
          6/10/2009    (end_of_day)
        manager Report Variables: same as 23-2012-LINC-MAIZ-RAIN.1_NilN-IrrigFullW.Manager folder.Report Variables
      maize
        ini: filename=MaizeValidation.xml
      manager SimCode
        on init:
```
ExpNo = 10
TreatNo = 1
```
      outputfile -> /Simulations/01-2010-LINC-MAIZ-MODE/2_MedN/outputfile: filename=10-2009-HAWK-MAIZ-PHEN 1_36H36-EarlySow.out; title=10-2009-HAWK-MAIZ-PHEN 1_36H36-EarlySow
        variables My Variables -> /Simulations/01-2010-LINC-MAIZ-MODE/2_MedN/outputfile/My Variables
        events My Variables Events -> /Simulations/01-2010-LINC-MAIZ-MODE/2_MedN/outputfile/My Variables Events
    area 2_36H36-LateSow -> /Simulations/10-2009-HAWK-MAIZ-PHEN/1_36H36-EarlySow
      folder Manager folder -> /Simulations/10-2009-HAWK-MAIZ-PHEN/1_36H36-EarlySow/Manager folder
        operations sow_harvest
          23/11/2009  maize sow plants = 12, sowing_depth = 80, cultivar = Pioneer_36H36, row_spacing = 760, crop_class = plant
          11/05/2010  maize harvest height = 0.1 (mm)
          11/05/2010  maize end_crop
      manager SimCode
        on init:
```
ExpNo = 10
TreatNo = 2
```
      outputfile -> /Simulations/01-2010-LINC-MAIZ-MODE/2_MedN/outputfile: filename=10-2009-HAWK-MAIZ-PHEN 2_36H36-LateSow.out; title=10-2009-HAWK-MAIZ-PHEN 2_36H36-LateSow
        variables My Variables -> /Simulations/01-2010-LINC-MAIZ-MODE/2_MedN/outputfile/My Variables
        events My Variables Events -> /Simulations/01-2010-LINC-MAIZ-MODE/2_MedN/outputfile/My Variables Events
    area 3_38P05-EarlySow -> /Simulations/10-2009-HAWK-MAIZ-PHEN/1_36H36-EarlySow
      folder Manager folder -> /Simulations/10-2009-HAWK-MAIZ-PHEN/1_36H36-EarlySow/Manager folder
        operations sow_harvest
          2/11/2009  maize sow plants = 12, sowing_depth = 80, cultivar = Pioneer_38P05, row_spacing = 760, crop_class = plant
          30/04/2010  maize harvest height = 0.1 (mm)
          30/04/2010  maize end_crop
      manager SimCode
        on init:
```
ExpNo = 10
TreatNo = 3
```
      outputfile -> /Simulations/01-2010-LINC-MAIZ-MODE/2_MedN/outputfile: filename=10-2009-HAWK-MAIZ-PHEN 3_38P05-EarlySow.out; title=10-2009-HAWK-MAIZ-PHEN 3_38P05-EarlySow
        variables My Variables -> /Simulations/01-2010-LINC-MAIZ-MODE/2_MedN/outputfile/My Variables
        events My Variables Events -> /Simulations/01-2010-LINC-MAIZ-MODE/2_MedN/outputfile/My Variables Events
    area 4_38P05-LateSow -> /Simulations/10-2009-HAWK-MAIZ-PHEN/1_36H36-EarlySow
      folder Manager folder -> /Simulations/10-2009-HAWK-MAIZ-PHEN/1_36H36-EarlySow/Manager folder
        operations sow_harvest
          23/11/2009  maize sow plants = 12, sowing_depth = 80, cultivar = Pioneer_38P05, row_spacing = 760, crop_class = plant
          11/05/2010  maize harvest height = 0.1 (mm)
          11/05/2010  maize end_crop
      manager SimCode
        on init:
```
ExpNo = 10
TreatNo = 4
```
      outputfile -> /Simulations/01-2010-LINC-MAIZ-MODE/2_MedN/outputfile: filename=10-2009-HAWK-MAIZ-PHEN 4_38P05-LateSow.out; title=10-2009-HAWK-MAIZ-PHEN 4_38P05-LateSow
        variables My Variables -> /Simulations/01-2010-LINC-MAIZ-MODE/2_MedN/outputfile/My Variables
        events My Variables Events -> /Simulations/01-2010-LINC-MAIZ-MODE/2_MedN/outputfile/My Variables Events
    area 5_39G12-EarlySow -> /Simulations/10-2009-HAWK-MAIZ-PHEN/1_36H36-EarlySow
      folder Manager folder -> /Simulations/10-2009-HAWK-MAIZ-PHEN/1_36H36-EarlySow/Manager folder
        operations sow_harvest
          2/11/2009  maize sow plants = 12, sowing_depth = 80, cultivar = Pioneer_39G12, row_spacing = 760, crop_class = plant
          21/04/2010  maize harvest height = 0.1 (mm)
          21/04/2010  maize end_crop
      manager SimCode
        on init:
```
ExpNo = 10
TreatNo = 5
```
      outputfile -> /Simulations/01-2010-LINC-MAIZ-MODE/2_MedN/outputfile: filename=10-2009-HAWK-MAIZ-PHEN 5_39G12-EarlySow.out; title=10-2009-HAWK-MAIZ-PHEN 5_39G12-EarlySow
        variables My Variables -> /Simulations/01-2010-LINC-MAIZ-MODE/2_MedN/outputfile/My Variables
        events My Variables Events -> /Simulations/01-2010-LINC-MAIZ-MODE/2_MedN/outputfile/My Variables Events
    area 6_39G12-LateSow -> /Simulations/10-2009-HAWK-MAIZ-PHEN/1_36H36-EarlySow
      folder Manager folder -> /Simulations/10-2009-HAWK-MAIZ-PHEN/1_36H36-EarlySow/Manager folder
        operations sow_harvest
          23/11/2009  maize sow plants = 12, sowing_depth = 80, cultivar = Pioneer_39G12, row_spacing = 760, crop_class = plant
          11/05/2010  maize harvest height = 0.1 (mm)
          11/05/2010  maize end_crop
      manager SimCode
        on init:
```
ExpNo = 10
TreatNo = 6
```
      outputfile -> /Simulations/01-2010-LINC-MAIZ-MODE/2_MedN/outputfile: filename=10-2009-HAWK-MAIZ-PHEN 6_39G12-LateSow.out; title=10-2009-HAWK-MAIZ-PHEN 6_39G12-LateSow
        variables My Variables -> /Simulations/01-2010-LINC-MAIZ-MODE/2_MedN/outputfile/My Variables
        events My Variables Events -> /Simulations/01-2010-LINC-MAIZ-MODE/2_MedN/outputfile/My Variables Events
    area 7_DK624-EarlySow -> /Simulations/10-2009-HAWK-MAIZ-PHEN/1_36H36-EarlySow
      folder Manager folder -> /Simulations/10-2009-HAWK-MAIZ-PHEN/1_36H36-EarlySow/Manager folder
        operations sow_harvest
          2/11/2009  maize sow plants = 12, sowing_depth = 80, cultivar = DK624, row_spacing = 760, crop_class = plant
          30/04/2010  maize harvest height = 0.1 (mm)
          30/04/2010  maize end_crop
      manager SimCode
        on init:
```
ExpNo = 10
TreatNo = 7
```
      outputfile -> /Simulations/01-2010-LINC-MAIZ-MODE/2_MedN/outputfile: filename=10-2009-HAWK-MAIZ-PHEN 7_DK624-EarlySow.out; title=10-2009-HAWK-MAIZ-PHEN 7_DK624-EarlySow
        variables My Variables -> /Simulations/01-2010-LINC-MAIZ-MODE/2_MedN/outputfile/My Variables
        events My Variables Events -> /Simulations/01-2010-LINC-MAIZ-MODE/2_MedN/outputfile/My Variables Events
    area 8_DK624-LateSow -> /Simulations/10-2009-HAWK-MAIZ-PHEN/1_36H36-EarlySow
      folder Manager folder -> /Simulations/10-2009-HAWK-MAIZ-PHEN/1_36H36-EarlySow/Manager folder
        operations sow_harvest
          23/11/2009  maize sow plants = 12, sowing_depth = 80, cultivar = DK624, row_spacing = 760, crop_class = plant
          02/06/2010  maize harvest height = 0.1 (mm)
          02/06/2010  maize end_crop
      manager SimCode
        on init:
```
ExpNo = 10
TreatNo = 8
```
      outputfile -> /Simulations/01-2010-LINC-MAIZ-MODE/2_MedN/outputfile: filename=10-2009-HAWK-MAIZ-PHEN 8_DK624-LateSow.out; title=10-2009-HAWK-MAIZ-PHEN 8_DK624-LateSow
        variables My Variables -> /Simulations/01-2010-LINC-MAIZ-MODE/2_MedN/outputfile/My Variables
        events My Variables Events -> /Simulations/01-2010-LINC-MAIZ-MODE/2_MedN/outputfile/My Variables Events
    area 9_N51-N4-EarlySow -> /Simulations/10-2009-HAWK-MAIZ-PHEN/1_36H36-EarlySow
      folder Manager folder -> /Simulations/10-2009-HAWK-MAIZ-PHEN/1_36H36-EarlySow/Manager folder
        operations sow_harvest
          2/11/2009  maize sow plants = 12, sowing_depth = 80, cultivar = N51-N4, row_spacing = 760, crop_class = plant
          20/04/2010  maize harvest height = 0.1 (mm)
          20/04/2010  maize end_crop
      manager SimCode
        on init:
```
ExpNo = 10
TreatNo = 9
```
      outputfile -> /Simulations/01-2010-LINC-MAIZ-MODE/2_MedN/outputfile: filename=10-2009-HAWK-MAIZ-PHEN 9_N51-N4-EarlySow.out; title=10-2009-HAWK-MAIZ-PHEN 9_N51-N4-EarlySow
        variables My Variables -> /Simulations/01-2010-LINC-MAIZ-MODE/2_MedN/outputfile/My Variables
        events My Variables Events -> /Simulations/01-2010-LINC-MAIZ-MODE/2_MedN/outputfile/My Variables Events
    area 10_N51-N4-LateSow -> /Simulations/10-2009-HAWK-MAIZ-PHEN/1_36H36-EarlySow
      folder Manager folder -> /Simulations/10-2009-HAWK-MAIZ-PHEN/1_36H36-EarlySow/Manager folder
        operations sow_harvest
          23/11/2009  maize sow plants = 12, sowing_depth = 80, cultivar = N51-N4, row_spacing = 760, crop_class = plant
          11/05/2010  maize harvest height = 0.1 (mm)
          11/05/2010  maize end_crop
      manager SimCode
        on init:
```
ExpNo = 10
TreatNo = 10
```
      outputfile -> /Simulations/01-2010-LINC-MAIZ-MODE/2_MedN/outputfile: filename=10-2009-HAWK-MAIZ-PHEN 10_N51-N4-LateSow.out; title=10-2009-HAWK-MAIZ-PHEN 10_N51-N4-LateSow
        variables My Variables -> /Simulations/01-2010-LINC-MAIZ-MODE/2_MedN/outputfile/My Variables
        events My Variables Events -> /Simulations/01-2010-LINC-MAIZ-MODE/2_MedN/outputfile/My Variables Events
  simulation 18-1990-LINC-MAIZ-RAIN
    metfile met: filename=lincoln.met
    clock
      start_date = 01/10/1990  # Enter the start date of the simulation
      end_date = 15/05/1991  # Enter the end date of the simulation
    summaryfile
    memo
      This experiment has not been set-up.

      Pioneer 3902

      TREATMENTS:
      Water
      IrrigFull = fully irrigated (1)
      Irrig1 = early drought (2)
      Irrig2 = early drought (3)
      Irrig3 = early drought (4)
      Irrig4 = middle drought (5)
      Irrig5 = middle drought (6)
      Irrig6 = middle drought (7)
      Irrig7 = late drought (8)
      Irrig8 = late drought (9)
      Irrig9 = late drought (10)

      still missing treatment 11 and 12....

      VARIABLES:
      Biomass
      - AboveDM
      - StemDM
      - LeafDM

      LAI

      Note that experiment info has been taken from an old simulation set up by Hamish at C:\Apsim_dev\Model\Maize\Tests\Validation
    area 1_IrrigFullW
      Soil paparoa_silt_loam: same as 02-2008-LINC-MAIZ-PLAS.1_34K77-Bare-EarlySow.paparoa_silt_loam
      irrigation: same as 01-2010-LINC-MAIZ-MODE.1_NilN.Irrigation
      surfaceom SurfaceOrganicMatter
        PoolName = fieldpea  # Organic Matter pool name
        type = fieldpea  # Organic Matter type
        mass = 0  # Initial surface residue (kg/ha)
        cnr = 40  # C:N ratio of initial residue
        standing_fraction = 0  # Fraction of residue standing
      fertiliser
      folder Manager folder
        operations sow_harvest
          6/11/1990  maize sow plants =10, sowing_depth = 50, cultivar = Pioneer_3902, row_spacing = 750, crop_class = plant
          1/05/1991  maize harvest height = 0.1 (mm)
          1/05/1991  maize end_crop
        operations fertil_applic
          27/11/1990  fertiliser apply amount= 13 (kg/ha), type=urea_N (), depth= 10 (mm)
          3/01/1991  fertiliser apply amount= 43 (kg/ha), type=urea_N (), depth= 10 (mm)
          10/01/1991  fertiliser apply amount= 43 (kg/ha), type=urea_N (), depth= 10 (mm)
          17/03/2008    (end_of_day)
          1/09/2009    (end_of_day)
          2/03/2009    (end_of_day)
          8/06/2009    (end_of_day)
          6/10/2009    (end_of_day)
        operations irrig_applic
          12/12/1990  irrigation apply amount= 22 (mm)
          20/12/1990  irrigation apply amount= 18 (mm)
          27/12/1990  irrigation apply amount= 20 (mm)
          3/01/1991  irrigation apply amount= 20 (mm)
          10/01/1991  irrigation apply amount= 36 (mm)
          17/01/1991  irrigation apply amount= 41 (mm)
          24/01/1991  irrigation apply amount= 31 (mm)
          31/01/1991  irrigation apply amount= 31 (mm)
          7/02/1991  irrigation apply amount= 40 (mm)
          14/02/1991  irrigation apply amount= 42 (mm)
          21/02/1991  irrigation apply amount= 40 (mm)
          28/02/1991  irrigation apply amount= 39 (mm)
          7/03/1991  irrigation apply amount= 21 (mm)
          14/03/1991  irrigation apply amount= 36 (mm)
          21/03/1991  irrigation apply amount= 27 (mm)
          28/03/1991  irrigation apply amount= 34 (mm)
          4/04/1991  irrigation apply amount= 35 (mm)
          17/03/2008    (end_of_day)
          1/09/2009    (end_of_day)
          2/03/2009    (end_of_day)
          8/06/2009    (end_of_day)
          6/10/2009    (end_of_day)
        manager Report Variables: same as 23-2012-LINC-MAIZ-RAIN.1_NilN-IrrigFullW.Manager folder.Report Variables
      maize
        ini: filename=MaizeValidation.xml
      manager SimCode
        on init:
```
ExpNo = 18
TreatNo = 1
```
      outputfile -> /Simulations/01-2010-LINC-MAIZ-MODE/2_MedN/outputfile: filename=18-1990-LINC-MAIZ-RAIN 1_IrrigFullW.out; title=18-1990-LINC-MAIZ-RAIN 1_IrrigFullW
        variables My Variables -> /Simulations/01-2010-LINC-MAIZ-MODE/2_MedN/outputfile/My Variables
        events My Variables Events -> /Simulations/01-2010-LINC-MAIZ-MODE/2_MedN/outputfile/My Variables Events
    area 2_Irrig1W -> /Simulations/18-1990-LINC-MAIZ-RAIN/1_IrrigFullW
      folder Manager folder -> /Simulations/18-1990-LINC-MAIZ-RAIN/1_IrrigFullW/Manager folder
        operations irrig_applic
          12/12/1990  irrigation apply amount= 0 (mm)
          20/12/1990  irrigation apply amount= 0 (mm)
          27/12/1990  irrigation apply amount= 0 (mm)
          3/01/1991  irrigation apply amount= 20 (mm)
          10/01/1991  irrigation apply amount= 36 (mm)
          17/01/1991  irrigation apply amount= 41 (mm)
          24/01/1991  irrigation apply amount= 31 (mm)
          31/01/1991  irrigation apply amount= 31 (mm)
          7/02/1991  irrigation apply amount= 40 (mm)
          14/02/1991  irrigation apply amount= 42 (mm)
          21/02/1991  irrigation apply amount= 40 (mm)
          28/02/1991  irrigation apply amount= 39 (mm)
          7/03/1991  irrigation apply amount= 21 (mm)
          14/03/1991  irrigation apply amount= 36 (mm)
          21/03/1991  irrigation apply amount= 27 (mm)
          28/03/1991  irrigation apply amount= 34 (mm)
          4/04/1991  irrigation apply amount= 35 (mm)
          17/03/2008    (end_of_day)
          1/09/2009    (end_of_day)
          2/03/2009    (end_of_day)
          8/06/2009    (end_of_day)
          6/10/2009    (end_of_day)
      manager SimCode
        on init:
```
ExpNo = 18
TreatNo = 2
```
      outputfile -> /Simulations/01-2010-LINC-MAIZ-MODE/2_MedN/outputfile: filename=18-1990-LINC-MAIZ-RAIN 2_Irrig1W.out; title=18-1990-LINC-MAIZ-RAIN 2_Irrig1W
        variables My Variables -> /Simulations/01-2010-LINC-MAIZ-MODE/2_MedN/outputfile/My Variables
        events My Variables Events -> /Simulations/01-2010-LINC-MAIZ-MODE/2_MedN/outputfile/My Variables Events
    area 3_Irrig2W -> /Simulations/18-1990-LINC-MAIZ-RAIN/1_IrrigFullW
      folder Manager folder -> /Simulations/18-1990-LINC-MAIZ-RAIN/1_IrrigFullW/Manager folder
        operations irrig_applic
          12/12/1990  irrigation apply amount= 0 (mm)
          20/12/1990  irrigation apply amount= 0 (mm)
          27/12/1990  irrigation apply amount= 0 (mm)
          3/01/1991  irrigation apply amount= 3 (mm)
          10/01/1991  irrigation apply amount= 3 (mm)
          17/01/1991  irrigation apply amount= 41 (mm)
          24/01/1991  irrigation apply amount= 31 (mm)
          31/01/1991  irrigation apply amount= 31 (mm)
          7/02/1991  irrigation apply amount= 40 (mm)
          14/02/1991  irrigation apply amount= 42 (mm)
          21/02/1991  irrigation apply amount= 40 (mm)
          28/02/1991  irrigation apply amount= 39 (mm)
          7/03/1991  irrigation apply amount= 21 (mm)
          14/03/1991  irrigation apply amount= 36 (mm)
          21/03/1991  irrigation apply amount= 27 (mm)
          28/03/1991  irrigation apply amount= 34 (mm)
          4/04/1991  irrigation apply amount= 35 (mm)
          17/03/2008    (end_of_day)
          1/09/2009    (end_of_day)
          2/03/2009    (end_of_day)
          8/06/2009    (end_of_day)
          6/10/2009    (end_of_day)
      manager SimCode
        on init:
```
ExpNo = 18
TreatNo = 3
```
      outputfile -> /Simulations/01-2010-LINC-MAIZ-MODE/2_MedN/outputfile: filename=18-1990-LINC-MAIZ-RAIN 3_Irrig2W.out; title=18-1990-LINC-MAIZ-RAIN 3_Irrig2W
        variables My Variables -> /Simulations/01-2010-LINC-MAIZ-MODE/2_MedN/outputfile/My Variables
        events My Variables Events -> /Simulations/01-2010-LINC-MAIZ-MODE/2_MedN/outputfile/My Variables Events
    area 4_Irrig3W -> /Simulations/18-1990-LINC-MAIZ-RAIN/1_IrrigFullW
      folder Manager folder -> /Simulations/18-1990-LINC-MAIZ-RAIN/1_IrrigFullW/Manager folder
        operations irrig_applic
          12/12/1990  irrigation apply amount= 0 (mm)
          20/12/1990  irrigation apply amount= 0 (mm)
          27/12/1990  irrigation apply amount= 0 (mm)
          3/01/1991  irrigation apply amount= 3 (mm)
          10/01/1991  irrigation apply amount= 3 (mm)
          17/01/1991  irrigation apply amount= 0 (mm)
          24/01/1991  irrigation apply amount= 0 (mm)
          31/01/1991  irrigation apply amount= 31 (mm)
          7/02/1991  irrigation apply amount= 40 (mm)
          14/02/1991  irrigation apply amount= 42 (mm)
          21/02/1991  irrigation apply amount= 40 (mm)
          28/02/1991  irrigation apply amount= 39 (mm)
          7/03/1991  irrigation apply amount= 21 (mm)
          14/03/1991  irrigation apply amount= 36 (mm)
          21/03/1991  irrigation apply amount= 27 (mm)
          28/03/1991  irrigation apply amount= 34 (mm)
          4/04/1991  irrigation apply amount= 35 (mm)
          17/03/2008    (end_of_day)
          1/09/2009    (end_of_day)
          2/03/2009    (end_of_day)
          8/06/2009    (end_of_day)
          6/10/2009    (end_of_day)
      manager SimCode
        on init:
```
ExpNo = 18
TreatNo = 4
```
      outputfile -> /Simulations/01-2010-LINC-MAIZ-MODE/2_MedN/outputfile: filename=18-1990-LINC-MAIZ-RAIN 4_Irrig3W.out; title=18-1990-LINC-MAIZ-RAIN 4_Irrig3W
        variables My Variables -> /Simulations/01-2010-LINC-MAIZ-MODE/2_MedN/outputfile/My Variables
        events My Variables Events -> /Simulations/01-2010-LINC-MAIZ-MODE/2_MedN/outputfile/My Variables Events
    area 5_Irrig4W -> /Simulations/18-1990-LINC-MAIZ-RAIN/1_IrrigFullW
      folder Manager folder -> /Simulations/18-1990-LINC-MAIZ-RAIN/1_IrrigFullW/Manager folder
        operations irrig_applic
          12/12/1990  irrigation apply amount= 22 (mm)
          20/12/1990  irrigation apply amount= 18 (mm)
          27/12/1990  irrigation apply amount= 20 (mm)
          3/01/1991  irrigation apply amount= 20 (mm)
          10/01/1991  irrigation apply amount= 36 (mm)
          17/01/1991  irrigation apply amount= 41 (mm)
          24/01/1991  irrigation apply amount= 31 (mm)
          31/01/1991  irrigation apply amount= 0 (mm)
          7/02/1991  irrigation apply amount= 0 (mm)
          14/02/1991  irrigation apply amount= 0 (mm)
          21/02/1991  irrigation apply amount= 40 (mm)
          28/02/1991  irrigation apply amount= 39 (mm)
          7/03/1991  irrigation apply amount= 21 (mm)
          14/03/1991  irrigation apply amount= 36 (mm)
          21/03/1991  irrigation apply amount= 27 (mm)
          28/03/1991  irrigation apply amount= 34 (mm)
          4/04/1991  irrigation apply amount= 35 (mm)
          17/03/2008    (end_of_day)
          1/09/2009    (end_of_day)
          2/03/2009    (end_of_day)
          8/06/2009    (end_of_day)
          6/10/2009    (end_of_day)
      manager SimCode
        on init:
```
ExpNo = 18
TreatNo = 5
```
      outputfile -> /Simulations/01-2010-LINC-MAIZ-MODE/2_MedN/outputfile: filename=18-1990-LINC-MAIZ-RAIN 5_Irrig4W.out; title=18-1990-LINC-MAIZ-RAIN 5_Irrig4W
        variables My Variables -> /Simulations/01-2010-LINC-MAIZ-MODE/2_MedN/outputfile/My Variables
        events My Variables Events -> /Simulations/01-2010-LINC-MAIZ-MODE/2_MedN/outputfile/My Variables Events
    area 6_Irrig5W -> /Simulations/18-1990-LINC-MAIZ-RAIN/1_IrrigFullW
      folder Manager folder -> /Simulations/18-1990-LINC-MAIZ-RAIN/1_IrrigFullW/Manager folder
        operations irrig_applic
          12/12/1990  irrigation apply amount= 22 (mm)
          20/12/1990  irrigation apply amount= 18 (mm)
          27/12/1990  irrigation apply amount= 20 (mm)
          3/01/1991  irrigation apply amount= 20 (mm)
          10/01/1991  irrigation apply amount= 36 (mm)
          17/01/1991  irrigation apply amount= 41 (mm)
          24/01/1991  irrigation apply amount= 31 (mm)
          31/01/1991  irrigation apply amount= 0 (mm)
          7/02/1991  irrigation apply amount= 0 (mm)
          14/02/1991  irrigation apply amount= 0 (mm)
          21/02/1991  irrigation apply amount= 0 (mm)
          28/02/1991  irrigation apply amount= 0 (mm)
          7/03/1991  irrigation apply amount= 21 (mm)
          14/03/1991  irrigation apply amount= 36 (mm)
          21/03/1991  irrigation apply amount= 27 (mm)
          28/03/1991  irrigation apply amount= 34 (mm)
          4/04/1991  irrigation apply amount= 35 (mm)
          17/03/2008    (end_of_day)
          1/09/2009    (end_of_day)
          2/03/2009    (end_of_day)
          8/06/2009    (end_of_day)
          6/10/2009    (end_of_day)
      manager SimCode
        on init:
```
ExpNo = 18
TreatNo = 6
```
      outputfile -> /Simulations/01-2010-LINC-MAIZ-MODE/2_MedN/outputfile: filename=18-1990-LINC-MAIZ-RAIN 6_Irrig5W.out; title=18-1990-LINC-MAIZ-RAIN 6_Irrig5W
        variables My Variables -> /Simulations/01-2010-LINC-MAIZ-MODE/2_MedN/outputfile/My Variables
        events My Variables Events -> /Simulations/01-2010-LINC-MAIZ-MODE/2_MedN/outputfile/My Variables Events
    area 7_Irrig6W -> /Simulations/18-1990-LINC-MAIZ-RAIN/1_IrrigFullW
      folder Manager folder -> /Simulations/18-1990-LINC-MAIZ-RAIN/1_IrrigFullW/Manager folder
        operations irrig_applic
          12/12/1990  irrigation apply amount= 22 (mm)
          20/12/1990  irrigation apply amount= 18 (mm)
          27/12/1990  irrigation apply amount= 20 (mm)
          3/01/1991  irrigation apply amount= 20 (mm)
          10/01/1991  irrigation apply amount= 36 (mm)
          17/01/1991  irrigation apply amount= 41 (mm)
          24/01/1991  irrigation apply amount= 31 (mm)
          31/01/1991  irrigation apply amount= 0 (mm)
          7/02/1991  irrigation apply amount= 0 (mm)
          14/02/1991  irrigation apply amount= 0 (mm)
          21/02/1991  irrigation apply amount= 0 (mm)
          28/02/1991  irrigation apply amount= 0 (mm)
          7/03/1991  irrigation apply amount= 0 (mm)
          14/03/1991  irrigation apply amount= 0 (mm)
          21/03/1991  irrigation apply amount= 0 (mm)
          28/03/1991  irrigation apply amount= 0 (mm)
          4/04/1991  irrigation apply amount= 0 (mm)
          17/03/2008    (end_of_day)
          1/09/2009    (end_of_day)
          2/03/2009    (end_of_day)
          8/06/2009    (end_of_day)
          6/10/2009    (end_of_day)
      manager SimCode
        on init:
```
ExpNo = 18
TreatNo = 7
```
      outputfile -> /Simulations/01-2010-LINC-MAIZ-MODE/2_MedN/outputfile: filename=18-1990-LINC-MAIZ-RAIN 7_Irrig6W.out; title=18-1990-LINC-MAIZ-RAIN 7_Irrig6W
        variables My Variables -> /Simulations/01-2010-LINC-MAIZ-MODE/2_MedN/outputfile/My Variables
        events My Variables Events -> /Simulations/01-2010-LINC-MAIZ-MODE/2_MedN/outputfile/My Variables Events
    area 8_Irrig7W -> /Simulations/18-1990-LINC-MAIZ-RAIN/1_IrrigFullW
      folder Manager folder -> /Simulations/18-1990-LINC-MAIZ-RAIN/1_IrrigFullW/Manager folder
        operations irrig_applic
          12/12/1990  irrigation apply amount= 22 (mm)
          20/12/1990  irrigation apply amount= 18 (mm)
          27/12/1990  irrigation apply amount= 20 (mm)
          3/01/1991  irrigation apply amount= 20 (mm)
          10/01/1991  irrigation apply amount= 36 (mm)
          17/01/1991  irrigation apply amount= 41 (mm)
          24/01/1991  irrigation apply amount= 31 (mm)
          31/01/1991  irrigation apply amount= 31 (mm)
          7/02/1991  irrigation apply amount= 40 (mm)
          14/02/1991  irrigation apply amount= 0 (mm)
          21/02/1991  irrigation apply amount= 0 (mm)
          28/02/1991  irrigation apply amount= 0 (mm)
          7/03/1991  irrigation apply amount= 0 (mm)
          14/03/1991  irrigation apply amount= 0 (mm)
          21/03/1991  irrigation apply amount= 0 (mm)
          28/03/1991  irrigation apply amount= 0 (mm)
          4/04/1991  irrigation apply amount= 0 (mm)
          17/03/2008    (end_of_day)
          1/09/2009    (end_of_day)
          2/03/2009    (end_of_day)
          8/06/2009    (end_of_day)
          6/10/2009    (end_of_day)
      manager SimCode
        on init:
```
ExpNo = 18
TreatNo = 8
```
      outputfile -> /Simulations/01-2010-LINC-MAIZ-MODE/2_MedN/outputfile: filename=18-1990-LINC-MAIZ-RAIN 8_Irrig7W.out; title=18-1990-LINC-MAIZ-RAIN 8_Irrig7W
        variables My Variables -> /Simulations/01-2010-LINC-MAIZ-MODE/2_MedN/outputfile/My Variables
        events My Variables Events -> /Simulations/01-2010-LINC-MAIZ-MODE/2_MedN/outputfile/My Variables Events
    area 9_Irrig8W -> /Simulations/18-1990-LINC-MAIZ-RAIN/1_IrrigFullW
      folder Manager folder -> /Simulations/18-1990-LINC-MAIZ-RAIN/1_IrrigFullW/Manager folder
        operations irrig_applic
          12/12/1990  irrigation apply amount= 22 (mm)
          20/12/1990  irrigation apply amount= 18 (mm)
          27/12/1990  irrigation apply amount= 20 (mm)
          3/01/1991  irrigation apply amount= 20 (mm)
          10/01/1991  irrigation apply amount= 36 (mm)
          17/01/1991  irrigation apply amount= 41 (mm)
          24/01/1991  irrigation apply amount= 31 (mm)
          31/01/1991  irrigation apply amount= 31 (mm)
          7/02/1991  irrigation apply amount= 40 (mm)
          14/02/1991  irrigation apply amount= 42 (mm)
          21/02/1991  irrigation apply amount= 40 (mm)
          28/02/1991  irrigation apply amount= 0 (mm)
          7/03/1991  irrigation apply amount= 0 (mm)
          14/03/1991  irrigation apply amount= 0 (mm)
          21/03/1991  irrigation apply amount= 0 (mm)
          28/03/1991  irrigation apply amount= 0 (mm)
          4/04/1991  irrigation apply amount= 0 (mm)
          17/03/2008    (end_of_day)
          1/09/2009    (end_of_day)
          2/03/2009    (end_of_day)
          8/06/2009    (end_of_day)
          6/10/2009    (end_of_day)
      manager SimCode
        on init:
```
ExpNo = 18
TreatNo = 9
```
      outputfile -> /Simulations/01-2010-LINC-MAIZ-MODE/2_MedN/outputfile: filename=18-1990-LINC-MAIZ-RAIN 9_Irrig8W.out; title=18-1990-LINC-MAIZ-RAIN 9_Irrig8W
        variables My Variables -> /Simulations/01-2010-LINC-MAIZ-MODE/2_MedN/outputfile/My Variables
        events My Variables Events -> /Simulations/01-2010-LINC-MAIZ-MODE/2_MedN/outputfile/My Variables Events
    area 10_Irrig9W -> /Simulations/18-1990-LINC-MAIZ-RAIN/1_IrrigFullW
      folder Manager folder -> /Simulations/18-1990-LINC-MAIZ-RAIN/1_IrrigFullW/Manager folder
        operations irrig_applic
          12/12/1990  irrigation apply amount= 22 (mm)
          20/12/1990  irrigation apply amount= 18 (mm)
          27/12/1990  irrigation apply amount= 20 (mm)
          3/01/1991  irrigation apply amount= 20 (mm)
          10/01/1991  irrigation apply amount= 36 (mm)
          17/01/1991  irrigation apply amount= 41 (mm)
          24/01/1991  irrigation apply amount= 31 (mm)
          31/01/1991  irrigation apply amount= 31 (mm)
          7/02/1991  irrigation apply amount= 40 (mm)
          14/02/1991  irrigation apply amount= 42 (mm)
          21/02/1991  irrigation apply amount= 40 (mm)
          28/02/1991  irrigation apply amount= 39 (mm)
          7/03/1991  irrigation apply amount= 21 (mm)
          14/03/1991  irrigation apply amount= 0 (mm)
          21/03/1991  irrigation apply amount= 0 (mm)
          28/03/1991  irrigation apply amount= 0 (mm)
          4/04/1991  irrigation apply amount= 0 (mm)
          17/03/2008    (end_of_day)
          1/09/2009    (end_of_day)
          2/03/2009    (end_of_day)
          8/06/2009    (end_of_day)
          6/10/2009    (end_of_day)
      manager SimCode
        on init:
```
ExpNo = 18
TreatNo = 10
```
      outputfile -> /Simulations/01-2010-LINC-MAIZ-MODE/2_MedN/outputfile: filename=18-1990-LINC-MAIZ-RAIN 10_Irrig9W.out; title=18-1990-LINC-MAIZ-RAIN 10_Irrig9W
        variables My Variables -> /Simulations/01-2010-LINC-MAIZ-MODE/2_MedN/outputfile/My Variables
        events My Variables Events -> /Simulations/01-2010-LINC-MAIZ-MODE/2_MedN/outputfile/My Variables Events
  simulation 24-2011-LINC-MAIZ-P21N
    metfile met: filename=lincoln.met
    clock
      start_date = 01/10/2011  # Enter the start date of the simulation
      end_date = 15/05/2012  # Enter the end date of the simulation
    summaryfile
    memo
      Not done yet......needs to be set-up, parametised etc

      TREATMENTS:
      Nitrogen
      NilN = 0 kg/ha
      VLowN = 50 kg/ha
      LowN = 100 kg/ha
      MedN = 200 kg/ha
      VHighN = 400 kg/ha

      VARIABLES:
      Biomass
      - AboveDM
      - GrainDM

      LAI

      SoilWater
      - 8 depths from 0-160cm (20cm increments) for NilN and VHighN treatments only --> only managed to get 6 depths for simulated......

      EAH added observed data and filters for all treatment levels, and treatment/variable info into memo
    area 1_NilN
      Soil paparoa_silt_loam: same as 02-2008-LINC-MAIZ-PLAS.1_34K77-Bare-EarlySow.paparoa_silt_loam
      irrigation: same as 01-2010-LINC-MAIZ-MODE.1_NilN.Irrigation
      surfaceom SurfaceOrganicMatter
        PoolName = fieldpea  # Organic Matter pool name
        type = fieldpea  # Organic Matter type
        mass = 0  # Initial surface residue (kg/ha)
        cnr = 40  # C:N ratio of initial residue
        standing_fraction = 0  # Fraction of residue standing
      fertiliser
      folder Manager folder
        operations sow_harvest
          31/10/2011  maize sow plants =12.5, sowing_depth = 50, cultivar = Pioneer_39G12, row_spacing = 760, crop_class = plant
          30/04/2012  maize harvest height = 0.1 (mm)
          30/04/2012  maize end_crop
        operations fertil_applic
          17/03/2008    (end_of_day)
          1/09/2009    (end_of_day)
          2/03/2009    (end_of_day)
          8/06/2009    (end_of_day)
          6/10/2009    (end_of_day)
        operations irrig_applic
          18/11/2011  irrigation apply amount= 10 (mm)
          22/12/2011  irrigation apply amount= 10 (mm)
          29/12/2011  irrigation apply amount= 15 (mm)
          4/01/2012  irrigation apply amount= 30 (mm)
          12/01/2012  irrigation apply amount= 25 (mm)
          24/01/2012  irrigation apply amount= 25 (mm)
          1/02/2012  irrigation apply amount= 10 (mm)
          7/02/2012  irrigation apply amount= 30 (mm)
          22/03/2012  irrigation apply amount= 25 (mm)
          17/03/2008    (end_of_day)
          1/09/2009    (end_of_day)
          2/03/2009    (end_of_day)
          8/06/2009    (end_of_day)
          6/10/2009    (end_of_day)
        manager Report Variables: same as 23-2012-LINC-MAIZ-RAIN.1_NilN-IrrigFullW.Manager folder.Report Variables
      maize
        ini: filename=MaizeValidation.xml
      manager SimCode
        on init:
```
ExpNo = 24
TreatNo = 1
```
      outputfile -> /Simulations/01-2010-LINC-MAIZ-MODE/2_MedN/outputfile: filename=24-2011-LINC-MAIZ-P21N 1_NilN.out; title=24-2011-LINC-MAIZ-P21N 1_NilN
        variables My Variables -> /Simulations/01-2010-LINC-MAIZ-MODE/2_MedN/outputfile/My Variables
        events My Variables Events -> /Simulations/01-2010-LINC-MAIZ-MODE/2_MedN/outputfile/My Variables Events
    area 2_VLowN -> /Simulations/24-2011-LINC-MAIZ-P21N/1_NilN
      folder Manager folder -> /Simulations/24-2011-LINC-MAIZ-P21N/1_NilN/Manager folder
        operations fertil_applic
          17/11/2011  fertiliser apply amount= 25 (kg/ha), type=urea_N (), depth= 10 (mm)
          29/12/2011  fertiliser apply amount= 25 (kg/ha), type=urea_N (), depth= 10 (mm)
          17/03/2008    (end_of_day)
          1/09/2009    (end_of_day)
          2/03/2009    (end_of_day)
          8/06/2009    (end_of_day)
          6/10/2009    (end_of_day)
      manager SimCode
        on init:
```
ExpNo = 24
TreatNo = 2
```
      outputfile -> /Simulations/01-2010-LINC-MAIZ-MODE/2_MedN/outputfile: filename=24-2011-LINC-MAIZ-P21N 2_VLowN.out; title=24-2011-LINC-MAIZ-P21N 2_VLowN
        variables My Variables -> /Simulations/01-2010-LINC-MAIZ-MODE/2_MedN/outputfile/My Variables
        events My Variables Events -> /Simulations/01-2010-LINC-MAIZ-MODE/2_MedN/outputfile/My Variables Events
    area 3_LowN -> /Simulations/24-2011-LINC-MAIZ-P21N/1_NilN
      folder Manager folder -> /Simulations/24-2011-LINC-MAIZ-P21N/1_NilN/Manager folder
        operations fertil_applic
          17/11/2011  fertiliser apply amount= 50 (kg/ha), type=urea_N (), depth= 10 (mm)
          29/12/2011  fertiliser apply amount= 50 (kg/ha), type=urea_N (), depth= 10 (mm)
          17/03/2008    (end_of_day)
          1/09/2009    (end_of_day)
          2/03/2009    (end_of_day)
          8/06/2009    (end_of_day)
          6/10/2009    (end_of_day)
      manager SimCode
        on init:
```
ExpNo = 24
TreatNo = 3
```
      outputfile -> /Simulations/01-2010-LINC-MAIZ-MODE/2_MedN/outputfile: filename=24-2011-LINC-MAIZ-P21N 3_LowN.out; title=24-2011-LINC-MAIZ-P21N 3_LowN
        variables My Variables -> /Simulations/01-2010-LINC-MAIZ-MODE/2_MedN/outputfile/My Variables
        events My Variables Events -> /Simulations/01-2010-LINC-MAIZ-MODE/2_MedN/outputfile/My Variables Events
    area 4_MedN -> /Simulations/24-2011-LINC-MAIZ-P21N/1_NilN
      folder Manager folder -> /Simulations/24-2011-LINC-MAIZ-P21N/1_NilN/Manager folder
        operations fertil_applic
          17/11/2011  fertiliser apply amount= 100 (kg/ha), type=urea_N (), depth= 10 (mm)
          29/12/2011  fertiliser apply amount= 100 (kg/ha), type=urea_N (), depth= 10 (mm)
          17/03/2008    (end_of_day)
          1/09/2009    (end_of_day)
          2/03/2009    (end_of_day)
          8/06/2009    (end_of_day)
          6/10/2009    (end_of_day)
      manager SimCode
        on init:
```
ExpNo = 24
TreatNo = 4
```
      outputfile -> /Simulations/01-2010-LINC-MAIZ-MODE/2_MedN/outputfile: filename=24-2011-LINC-MAIZ-P21N 4_MedN.out; title=24-2011-LINC-MAIZ-P21N 4_MedN
        variables My Variables -> /Simulations/01-2010-LINC-MAIZ-MODE/2_MedN/outputfile/My Variables
        events My Variables Events -> /Simulations/01-2010-LINC-MAIZ-MODE/2_MedN/outputfile/My Variables Events
    area 5_VHighN -> /Simulations/24-2011-LINC-MAIZ-P21N/1_NilN
      folder Manager folder -> /Simulations/24-2011-LINC-MAIZ-P21N/1_NilN/Manager folder
        operations fertil_applic
          17/11/2011  fertiliser apply amount= 200 (kg/ha), type=urea_N (), depth= 10 (mm)
          29/12/2011  fertiliser apply amount= 200 (kg/ha), type=urea_N (), depth= 10 (mm)
          17/03/2008    (end_of_day)
          1/09/2009    (end_of_day)
          2/03/2009    (end_of_day)
          8/06/2009    (end_of_day)
          6/10/2009    (end_of_day)
      manager SimCode
        on init:
```
ExpNo = 24
TreatNo = 5
```
      outputfile -> /Simulations/01-2010-LINC-MAIZ-MODE/2_MedN/outputfile: filename=24-2011-LINC-MAIZ-P21N 5_VHighN.out; title=24-2011-LINC-MAIZ-P21N 5_VHighN
        variables My Variables -> /Simulations/01-2010-LINC-MAIZ-MODE/2_MedN/outputfile/My Variables
        events My Variables Events -> /Simulations/01-2010-LINC-MAIZ-MODE/2_MedN/outputfile/My Variables Events
  simulation 22-2006-CHER-MAIZ-NITR
    metfile met: filename=lincoln.met
    clock
      start_date = 21/10/2006  # Enter the start date of the simulation
      end_date = 21/04/2007  # Enter the end date of the simulation
    summaryfile
    memo
      Not done yet......needs to be set-up, parametised etc

      TREATMENTS:
      Nitrogen
      VLowN = 36 kg/ha applied at planting
      LowN = 36 kg/ha applied at planting plus 55 kg N/ha side dressed at V6 (not enough)
      MedN = 36 kg/ha applied at planting plus 110 kg N/ha side dressed at V6 (Calculator recommendation)
      HighN = 36 kg/ha applied at planting plus 220 kg N/ha side dressed at V6 (too much)

      VARIABLES:
      Biomass
      - AboveDM
      - StemDM
      - LeafDM
      - EarDM --> still need simulated data

      LAI

      LeafNo
      - LeafTips

      EAH added observed data and filters for all treatment levels, and treatment/variable info into memo
    area 1_VLowN
      Soil paparoa_silt_loam: same as 02-2008-LINC-MAIZ-PLAS.1_34K77-Bare-EarlySow.paparoa_silt_loam
      irrigation: same as 01-2010-LINC-MAIZ-MODE.1_NilN.Irrigation
      surfaceom SurfaceOrganicMatter
        PoolName = fieldpea  # Organic Matter pool name
        type = fieldpea  # Organic Matter type
        mass = 0  # Initial surface residue (kg/ha)
        cnr = 40  # C:N ratio of initial residue
        standing_fraction = 0  # Fraction of residue standing
      fertiliser
      folder Manager folder
        operations sow_harvest
          31/10/2006  maize sow plants =11.3, sowing_depth = 50, cultivar = Prinz, row_spacing = 760, crop_class = plant
          12/04/2007  maize harvest height = 0.1 (mm)
          12/04/2007  maize end_crop
        operations fertil_applic: same as 01-2010-LINC-MAIZ-MODE.1_NilN.Manager folder.fertil_applic
        operations irrig_applic: same as 01-2010-LINC-MAIZ-MODE.1_NilN.Manager folder.irrig_applic
        manager Report Variables: same as 23-2012-LINC-MAIZ-RAIN.1_NilN-IrrigFullW.Manager folder.Report Variables
      maize
        ini: filename=MaizeValidation.xml
      manager SimCode
        on init:
```
ExpNo = 22
TreatNo = 1
```
      outputfile -> /Simulations/01-2010-LINC-MAIZ-MODE/2_MedN/outputfile: filename=22-2006-CHER-MAIZ-NITR 1_VLowN.out; title=22-2006-CHER-MAIZ-NITR 1_VLowN
        variables My Variables -> /Simulations/01-2010-LINC-MAIZ-MODE/2_MedN/outputfile/My Variables
        events My Variables Events -> /Simulations/01-2010-LINC-MAIZ-MODE/2_MedN/outputfile/My Variables Events
    area 2_LowN -> /Simulations/22-2006-CHER-MAIZ-NITR/1_VLowN
      manager SimCode
        on init:
```
ExpNo = 22
TreatNo = 2
```
      outputfile -> /Simulations/01-2010-LINC-MAIZ-MODE/2_MedN/outputfile: filename=22-2006-CHER-MAIZ-NITR 2_LowN.out; title=22-2006-CHER-MAIZ-NITR 2_LowN
        variables My Variables -> /Simulations/01-2010-LINC-MAIZ-MODE/2_MedN/outputfile/My Variables
        events My Variables Events -> /Simulations/01-2010-LINC-MAIZ-MODE/2_MedN/outputfile/My Variables Events
    area 3_MedN -> /Simulations/22-2006-CHER-MAIZ-NITR/1_VLowN
      folder Manager folder -> /Simulations/22-2006-CHER-MAIZ-NITR/1_VLowN/Manager folder
        operations fertil_applic: same as 01-2010-LINC-MAIZ-MODE.1_NilN.Manager folder.fertil_applic
      manager SimCode
        on init:
```
ExpNo = 22
TreatNo = 3
```
      outputfile -> /Simulations/01-2010-LINC-MAIZ-MODE/2_MedN/outputfile: filename=22-2006-CHER-MAIZ-NITR 3_MedN.out; title=22-2006-CHER-MAIZ-NITR 3_MedN
        variables My Variables -> /Simulations/01-2010-LINC-MAIZ-MODE/2_MedN/outputfile/My Variables
        events My Variables Events -> /Simulations/01-2010-LINC-MAIZ-MODE/2_MedN/outputfile/My Variables Events
    area 4_HighN -> /Simulations/22-2006-CHER-MAIZ-NITR/1_VLowN
      folder Manager folder -> /Simulations/22-2006-CHER-MAIZ-NITR/1_VLowN/Manager folder
        operations fertil_applic: same as 01-2010-LINC-MAIZ-MODE.1_NilN.Manager folder.fertil_applic
      manager SimCode
        on init:
```
ExpNo = 22
TreatNo = 4
```
      outputfile -> /Simulations/01-2010-LINC-MAIZ-MODE/2_MedN/outputfile: filename=22-2006-CHER-MAIZ-NITR 4_HighN.out; title=22-2006-CHER-MAIZ-NITR 4_HighN
        variables My Variables -> /Simulations/01-2010-LINC-MAIZ-MODE/2_MedN/outputfile/My Variables
        events My Variables Events -> /Simulations/01-2010-LINC-MAIZ-MODE/2_MedN/outputfile/My Variables Events
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